# OpenSim document version 30000
Model MoBL_ARMS_module5_scaled:
  publications: Comp Meth Biomech Biomed Eng 2014
  length_units: meters
  force_units: N
  gravity: 0 -9.80665 0
  credits:
    Katherine R. Saul, Wendy M. Murray, Craig M. Goehler, Melissa Daly, Meghan E. Vidt, Dustin L. Crouch
  BodySet:
    Body ground: mass=0 mass_center=(0 0 0) inertia_xx=1 inertia_yy=1 inertia_zz=1
    Body thorax: mass=0 mass_center=(0 0 0) inertia_xx=0 inertia_yy=0 inertia_zz=0 meshes=thorax.vtp
      CustomJoint groundthorax: parent_body=ground location_in_parent=(0 0 0) location=(0 0 0)
        Coordinate r_x: motion_type=rotational default_value=0 range=(-6.283185 6.283185) clamped=true
        Coordinate r_y: motion_type=rotational default_value=6.866731e-9 range=(-6.283185 6.283185) clamped=true
        Coordinate r_z: motion_type=rotational default_value=0 range=(-6.283185 6.283185) clamped=true
        Coordinate t_x: motion_type=translational default_value=0 range=(-100 100) clamped=true
        Coordinate t_y: motion_type=translational default_value=0 range=(-100 100) clamped=true
        Coordinate t_z: motion_type=translational default_value=0 range=(-100 100) clamped=true
        SpatialTransform:
          TransformAxis rotation1: coordinates=r_x axis=(1 0 0) LinearFunction(coefficients=1 0)
          TransformAxis rotation2: coordinates=r_y axis=(0 1 0) LinearFunction(coefficients=1 0)
          TransformAxis rotation3: coordinates=r_z axis=(0 0 1) LinearFunction(coefficients=1 0)
          TransformAxis translation1: coordinates=t_x axis=(1 0 0) LinearFunction(coefficients=1 0)
          TransformAxis translation2: coordinates=t_y axis=(0 1 0) LinearFunction(coefficients=1 0)
          TransformAxis translation3: coordinates=t_z axis=(0 0 1) LinearFunction(coefficients=1 0)
      WrapEllipsoid Thorax: xyz_body_rotation=(0.0434587 -0.331962 0.189892) translation=(-0.0386 -0.1273 0.0709)
          quadrant=all dimensions=(0.1 0.135 0.08)
    Body clavicle: mass=0.1447127 mass_center=(-0.0117551 0.00675083 0.0573857) inertia_xx=0.0002525671
        inertia_yy=0.0002657582 inertia_zz=4.624688e-5 inertia_xy=-1.97606e-5 inertia_xz=-7.281646e-5
        inertia_yz=5.591896e-5 meshes=clavicle.vtp
      CustomJoint sternoclavicular: parent_body=thorax location_in_parent=(0.006325 0.00693 0.025465) location=(0 0 0)
        Coordinate sternoclavicular_r2: motion_type=rotational default_value=-7.295365e-6 range=(-99999.9 99999.9)
            clamped=false
        Coordinate sternoclavicular_r3: motion_type=rotational default_value=3.089972e-6 range=(-99999.9 99999.9)
            clamped=false
        SpatialTransform: axes_held_at_zero=(rotation3 translation1 translation2 translation3)
          TransformAxis rotation1: coordinates=sternoclavicular_r2 axis=(0.0153 0.9892987 -0.1451)
              LinearFunction(coefficients=1 0)
          TransformAxis rotation2: coordinates=sternoclavicular_r3 axis=(-0.9944725 0 -0.104997)
              LinearFunction(coefficients=1 0)
    Body clavphant: mass=9.276458e-5 mass_center=(0 0 0) inertia_xx=0.9276458 inertia_yy=0.9276458 inertia_zz=0.9276458
      CustomJoint unrotscap: parent_body=clavicle location_in_parent=(-0.01518123 0.0212622 0.1435861) location=(0 0 0)
        Coordinate unrotscap_r3: motion_type=rotational default_value=-3.089972e-6 range=(-99999.9 99999.9)
            clamped=false
        Coordinate unrotscap_r2: motion_type=rotational default_value=7.295365e-6 range=(-99999.9 99999.9)
            clamped=false
        SpatialTransform: axes_held_at_zero=(rotation3 translation1 translation2 translation3)
          TransformAxis rotation1: coordinates=unrotscap_r3 axis=(-0.9944725 0 -0.104997)
              LinearFunction(coefficients=1 0)
          TransformAxis rotation2: coordinates=unrotscap_r2 axis=(0.0153 0.9892987 -0.1451)
              LinearFunction(coefficients=1 0)
    Body scapula: mass=0.6530255 mass_center=(-0.0536108 -0.0343382 -0.0428679) inertia_xx=0.001107757
        inertia_yy=0.001025314 inertia_zz=0.001216669 inertia_xy=0.0004005357 inertia_xz=0.0003647245
        inertia_yz=0.0002148846 meshes=scapula.vtp
      CustomJoint acromioclavicular: parent_body=clavphant location_in_parent=(0 0 0) location=(0 0 0)
        Coordinate acromioclavicular_r2: motion_type=rotational default_value=-1.477163e-6 range=(-99999.9 99999.9)
            clamped=false
        Coordinate acromioclavicular_r3: motion_type=rotational default_value=1.193791e-5 range=(-99999.9 99999.9)
            clamped=false
        Coordinate acromioclavicular_r1: motion_type=rotational default_value=5.366009e-6 range=(-99999.9 99999.9)
            clamped=false
        SpatialTransform: axes_held_at_zero=(translation1 translation2 translation3)
          TransformAxis rotation1: coordinates=acromioclavicular_r2 axis=(0.1570949 0.9472686 -0.2792909)
              LinearFunction(coefficients=1 0)
          TransformAxis rotation2: coordinates=acromioclavicular_r3 axis=(-0.754084 0.297594 0.585487)
              LinearFunction(coefficients=1 0)
          TransformAxis rotation3: coordinates=acromioclavicular_r1 axis=(0.6376998 0.1186 0.7610998)
              LinearFunction(coefficients=1 0)
      WrapEllipsoid Deltoid2: xyz_body_rotation=(3.13042 -1.54881 -1.31423)
          translation=(-0.00568514 -0.0370514 0.00940988) quadrant=-y dimensions=(0.0323465 0.0392078 0.0343069)
      WrapTorus Delt3: xyz_body_rotation=(0.620988 0.32882 -0.560774) translation=(-0.0953731 -0.0419524 -0.0362673)
          quadrant=all inner_radius=0.03920784 outer_radius=0.05881177
      WrapTorus INFSP: xyz_body_rotation=(0.0253073 0.58835 0.151844) translation=(-0.054989 -0.0195059 -0.0109782)
          quadrant=all inner_radius=0.007841569 outer_radius=0.01862373
      WrapEllipsoid TMIN: xyz_body_rotation=(-2.09754 -0.280823 -1.76348) translation=(-0.0409722 -0.0508722 -0.035189)
          quadrant=x dimensions=(0.0294059 0.0294059 0.0490098)
      WrapCylinder TRIlongglen: xyz_body_rotation=(1.37532 -0.294612 2.43596)
          translation=(-0.035189 -0.0302881 -0.0129386) quadrant=x radius=0.002940588 length=0.02940588
    Body scapphant: mass=9.276458e-5 mass_center=(0 0 0) inertia_xx=0.9276458 inertia_yy=0.9276458 inertia_zz=0.9276458
      CustomJoint unrothum: parent_body=scapula location_in_parent=(-0.009360873 -0.03332667 0.008821765)
          location=(0 0 0)
        Coordinate unrothum_r1: motion_type=rotational default_value=-5.366009e-6 range=(-99999.9 99999.9)
            clamped=false
        Coordinate unrothum_r3: motion_type=rotational default_value=-1.193791e-5 range=(-99999.9 99999.9)
            clamped=false
        Coordinate unrothum_r2: motion_type=rotational default_value=1.477163e-6 range=(-99999.9 99999.9) clamped=false
        SpatialTransform: axes_held_at_zero=(translation1 translation2 translation3)
          TransformAxis rotation1: coordinates=unrothum_r1 axis=(0.6376998 0.1186 0.7610998)
              LinearFunction(coefficients=1 0)
          TransformAxis rotation2: coordinates=unrothum_r3 axis=(-0.754084 0.297594 0.585487)
              LinearFunction(coefficients=1 0)
          TransformAxis rotation3: coordinates=unrothum_r2 axis=(0.1570949 0.9472686 -0.2792909)
              LinearFunction(coefficients=1 0)
    Body humphant: mass=9.276458e-5 mass_center=(0 0 0) inertia_xx=0.9276458 inertia_yy=0.9276458 inertia_zz=0.9276458
      CustomJoint shoulder0: parent_body=scapphant location_in_parent=(0 0 0) location=(0 0 0)
        Coordinate elv_angle: motion_type=rotational default_value=9.056417e-10 range=(-1.658063 2.268928) clamped=true
        SpatialTransform: axes_held_at_zero=(rotation2 rotation3 translation1 translation2 translation3)
          TransformAxis rotation1: coordinates=elv_angle axis=(0.0048 0.9990892 0.04240001)
              LinearFunction(coefficients=1 0)
    Body humphant1: mass=9.276458e-5 mass_center=(0 0 0) inertia_xx=0.9276458 inertia_yy=0.9276458 inertia_zz=0.9276458
      CustomJoint shoulder1: parent_body=humphant location_in_parent=(0 0 0) location=(0 0 0)
        Coordinate shoulder_elv: motion_type=rotational default_value=3.014607e-5 range=(0 3.141593) clamped=true
        Coordinate shoulder1_r2: motion_type=rotational default_value=-9.056418e-10 range=(-99999.9 99999.9)
            clamped=false
        SpatialTransform: axes_held_at_zero=(rotation3 translation1 translation2 translation3)
          TransformAxis rotation1: coordinates=shoulder_elv axis=(-0.9982614 0.0023 0.05889802)
              LinearFunction(coefficients=1 0)
          TransformAxis rotation2: coordinates=shoulder1_r2 axis=(0.0048 0.9990892 0.04240001)
              LinearFunction(coefficients=1 0)
    Body humerus: mass=1.853037 mass_center=(0.0177063 -0.137366 -0.0124936) inertia_xx=0.01094265
        inertia_yy=0.002273918 inertia_zz=0.01121115 inertia_xy=-0.0003096353 inertia_xz=-0.0002072197
        inertia_yz=0.001095635 meshes=humerus.vtp
      CustomJoint shoulder2: parent_body=humphant1 location_in_parent=(0 0 0) location=(0 0 0)
        Coordinate shoulder_rot: motion_type=rotational default_value=1.57275e-9 range=(-1.570796 2.094395)
            clamped=true
        SpatialTransform: axes_held_at_zero=(rotation2 rotation3 translation1 translation2 translation3)
          TransformAxis rotation1: coordinates=shoulder_rot axis=(0.0048 0.9990892 0.04240001)
              LinearFunction(coefficients=1 0)
      WrapEllipsoid DELT1hh: xyz_body_rotation=(0.0584685 1.00461 0.570374)
          translation=(-0.0136247 -0.0124485 -0.0256811) quadrant=z dimensions=(0.0294059 0.0980196 0.0490098)
      WrapCylinder delt2hum: xyz_body_rotation=(1.55093 -0.0199582 0.0596618)
          translation=(0.00166633 -0.0939028 0.00107822) quadrant=all radius=0.01068414 length=0.1176235
      WrapEllipsoid delt3hum: xyz_body_rotation=(1.72735 0.0759218 -2.74313)
          translation=(0.00186237 -0.0580276 0.00107822) quadrant=x dimensions=(0.00980196 0.00980196 0.0490098)
      WrapEllipsoid SUPSP: xyz_body_rotation=(0.0380482 0.00855211 -1.30673)
          translation=(0.000196039 0.00754751 0.00421484) quadrant=all dimensions=(0.0196039 0.0196039 0.0196039)
      WrapEllipsoid INFSP_and_TMIN_hum_head: xyz_body_rotation=(-0.286583 -0.00907571 -0.0684169)
          translation=(-0.000294059 0.00254851 0.00372475) quadrant=all dimensions=(0.0196039 0.0245049 0.0196039)
      WrapCylinder infsp_new: xyz_body_rotation=(1.52911 -0.345 -0.65966)
          translation=(-0.00186237 -0.0186237 0.00215643) quadrant=-x radius=0.02303461 length=0.1127226
      WrapEllipsoid SUBSCAP: xyz_body_rotation=(-0.924501 0.288852 0.381529)
          translation=(-0.00245049 0.000686137 -0.00441088) quadrant=all dimensions=(0.0196039 0.0166633 0.0274455)
      WrapEllipsoid LIGhh_s: xyz_body_rotation=(-0.785 0 0) translation=(-0.000980196 0.00294059 0.00294059)
          quadrant=all dimensions=(0.0196039 0.0196039 0.0196039)
      WrapEllipsoid LIGhh_mi: xyz_body_rotation=(-0.785 0 0) translation=(-0.000980196 0.00392078 0.000980196)
          quadrant=all dimensions=(0.020094 0.0186237 0.020094)
      WrapCylinder TMINhum: xyz_body_rotation=(1.47353 0.0229 3.21463) translation=(0.00294059 -0.024995 0.00127425)
          quadrant=x radius=0.02156431 length=0.1107622
      WrapCylinder TMAJ_LAThum: xyz_body_rotation=(1.53641 -0.0637045 1.41424)
          translation=(0.000686137 -0.0434227 -0.00539108) quadrant=-x radius=0.006861373 length=0.03920784
      WrapCylinder PEC12hum: xyz_body_rotation=(1.55928 -0.0774926 -0.925897)
          translation=(0.00196039 -0.049794 -0.00166633) quadrant=x radius=0.008821765 length=0.06861373
      WrapSphere PEC23hh: translation=(-0.00842969 0.00205841 -0.000392078) quadrant=all radius=0.01960392
      WrapEllipsoid PEC1hh: xyz_body_rotation=(-0.620465 -0.310494 0.363727)
          translation=(-0.00362673 0.000490098 -0.00245049) quadrant=-z dimensions=(0.0294059 0.0196039 0.0196039)
      WrapCylinder PEC3hum: xyz_body_rotation=(1.44094 -0.0561996 1.75196)
          translation=(0.000882176 -0.0540088 -0.000392078) quadrant=-x radius=0.007841569 length=0.09801961
      WrapCylinder LAT_TMAJhh: xyz_body_rotation=(-0.305084 -0.018326 -0.686613)
          translation=(-0.0219564 0.009998 0.00921384) quadrant=-y radius=0.006861373 length=0.04410882
      WrapSphere LAT_TMAJ2hh: xyz_body_rotation=(-0.127235 0.276111 0.0197222)
          translation=(-0.00156831 0.0090178 0.00509702) quadrant=all radius=0.02940588
      WrapEllipsoid Elbow_BIC_BRD: xyz_body_rotation=(-0.128631 0.137532 0.0307178)
          translation=(0.00186237 -0.283277 -0.0137227) quadrant=x dimensions=(0.0147029 0.0147029 0.0980196)
      WrapEllipsoid TRIlonghh: xyz_body_rotation=(3.00162 -0.853466 2.57419)
          translation=(-0.00764553 -0.0040188 -0.00137227) quadrant=z dimensions=(0.0343069 0.0196039 0.0196039)
      WrapCylinder TRI: xyz_body_rotation=(-0.14015 -0.00628319 0.154985) translation=(0.00274455 -0.286119 -0.0116643)
          quadrant=all radius=0.01568314 length=0.09801961
      WrapEllipsoid ANC: xyz_body_rotation=(0.00750492 -0.196699 1.04929)
          translation=(0.0131346 -0.280434 -0.000784157) quadrant=-x dimensions=(0.0196039 0.0196039 0.0196039)
      WrapEllipsoid BIClong: xyz_body_rotation=(-2.00434 -1.00164 0.975465)
          translation=(0.00323465 0.00490098 0.000294059) quadrant=-y dimensions=(0.0245049 0.0196039 0.0196039)
      WrapSphere TMAJ_LAT_PEC_CORBhh: translation=(0.000686137 0 0.00588118) quadrant=all radius=0.02940588
      WrapSphere DELT_TMAJ_LAT_PEC_CORBhh: translation=(0.000686137 0 0.00588118) quadrant=all radius=0.02940588
      WrapCylinder CORBhum: xyz_body_rotation=(-1.60832 0.0959931 0.875283)
          translation=(0.00264653 -0.11782 -0.00578316) quadrant=x radius=0.007841569 length=0.09801961
      WrapEllipsoid Elbow_PT_ECRL: xyz_body_rotation=(-0.161094 -0.110828 0.61453)
          translation=(0.00294059 -0.281512 -0.00676335) quadrant=x dimensions=(0.0176435 0.0245049 0.0343069)
    Body ulna: mass=1.025327 mass_center=(0.0103877 -0.102565 0.02596) inertia_xx=0.005737514 inertia_yy=0.001222294
        inertia_zz=0.005239896 inertia_xy=0.0003358504 inertia_xz=-8.071391e-5 inertia_yz=0.001157118 meshes=ulna.vtp
      CustomJoint elbow: parent_body=humerus location_in_parent=(0.005979196 -0.2846489 -0.01205641) location=(0 0 0)
        Coordinate elbow_flexion: motion_type=rotational default_value=6.316681e-5 range=(0 2.268928) clamped=true
        SpatialTransform: axes_held_at_zero=(rotation2 rotation3 translation1 translation2 translation3)
          TransformAxis rotation1: coordinates=elbow_flexion axis=(0.04940001 0.03660001 0.9981083)
              LinearFunction(coefficients=1 0)
      WrapCylinder PQ2: xyz_body_rotation=(1.39138 0.0689405 1.52245) translation=(-0.00128271 -0.22362 0.0457501)
          quadrant=all radius=0.007482491 length=0.1068927
    Body radius: mass=0.2166888 mass_center=(0.0359524 -0.194073 0.0166753) inertia_xx=0.0004648337
        inertia_yy=9.389948e-5 inertia_zz=0.0004267079 inertia_xy=3.194639e-5 inertia_xz=-4.494117e-6
        inertia_yz=6.802651e-5 meshes=radius.vtp
      CustomJoint radioulnar: parent_body=ulna location_in_parent=(0.0004275709 -0.01229587 0.02137748)
          location=(0 0 0)
        Coordinate pro_sup: motion_type=rotational default_value=0 range=(-1.570796 1.570796) clamped=true
        SpatialTransform: axes_held_at_zero=(rotation2 rotation3 translation1 translation2 translation3)
          TransformAxis rotation1: coordinates=pro_sup axis=(-0.01716099 0.9926656 -0.119668)
              LinearFunction(coefficients=1 0)
      WrapCylinder SUP: xyz_body_rotation=(1.44775 0.304036 -2.44102) translation=(0.00481017 -0.0467121 0.00630667)
          quadrant=-x radius=0.008551418 length=0.04275709
      WrapTorus ECU: xyz_body_rotation=(-0.986635 -0.148877 0.222704) translation=(-0.0174235 -0.25836 0.0373056)
          quadrant=all inner_radius=0.006413563 outer_radius=0.009620345
      WrapCylinder PQ1: xyz_body_rotation=(-1.60762 -0.0127409 -2.69025) translation=(0.0300369 -0.212289 0.0307851)
          quadrant=all radius=0.01068927 length=0.1068927
    Body proximal_row: mass=9.276458e-5 mass_center=(0 0 0) inertia_xx=9.276458e-6 inertia_yy=9.276458e-6
        inertia_zz=9.276458e-6 meshes=(lunate.vtp sdfastSCAPHOIDw.vtp sdfastPISIFORMw.vtp sdfastTRIQUETRALw.vtp)
      CustomJoint radiocarpal: parent_body=radius location_in_parent=(0.01924069 -0.2586804 0.02672318)
          location=(0 0 0)
        Coordinate deviation: motion_type=rotational default_value=2.828477e-9 range=(-0.1745329 0.4363323)
            clamped=true
        Coordinate flexion: motion_type=rotational default_value=0 range=(-1.22173 1.22173) clamped=true
        SpatialTransform: axes_held_at_zero=(rotation2 translation1 translation2 translation3)
          TransformAxis rotation1: coordinates=deviation axis=(-0.819064 -0.135611 -0.557444)
            SimmSpline: x=(-0.174533 0 0.436332) y=(-0.174533 0 0.436332)
          TransformAxis rotation3: coordinates=flexion axis=(0.9564267 -0.2522069 0.147104)
            SimmSpline: x=(-1.5708 1.5708) y=(-0.785398 0.785398)
      WrapEllipsoid Extensor_ellipse: xyz_body_rotation=(-0.250804 0.285536 0.232827)
          translation=(0.0007 -0.0135 0.0047) quadrant=z dimensions=(0.05 0.02 0.013)
      WrapTorus ECRL: xyz_body_rotation=(1.53833 0.234398 0.731118) translation=(0.0222 -0.0096 0.0208) quadrant=all
          inner_radius=0.008 outer_radius=0.016
      WrapTorus ECRB: xyz_body_rotation=(1.31266 -0.11781 -0.116239) translation=(0.0126 -0.0095 0.0186) quadrant=all
          inner_radius=0.008 outer_radius=0.01
      WrapTorus FCR: xyz_body_rotation=(-1.55596 -0.15324 -0.100007) translation=(0.0032 -0.0045 -0.019) quadrant=all
          inner_radius=0.001 outer_radius=0.0025
      WrapTorus FCU: xyz_body_rotation=(-1.57376 -0.0797616 0.39235) translation=(-0.0123 -0.0124 -0.0171) quadrant=all
          inner_radius=0.0068 outer_radius=0.008
      WrapEllipsoid PL: xyz_body_rotation=(-0.0315905 0.0996583 0.0633554) translation=(0.0057 -0.018 -0.0041)
          quadrant=-z dimensions=(0.025 0.014 0.012)
      WrapEllipsoid FDS: xyz_body_rotation=(0.00837758 -0.0816814 -0.0171042) translation=(0.0012 -0.0057 -0.0003)
          quadrant=-z dimensions=(0.025 0.013 0.012)
      WrapEllipsoid FDP: xyz_body_rotation=(-1.46747 -0.194604 0.121824) translation=(-0.0022 -0.0069 0.0032)
          quadrant=y dimensions=(0.025 0.013 0.012)
      WrapTorus EDCL: xyz_body_rotation=(2.36318 0.193033 -0.26913) translation=(-0.0128 -0.0133 0.0148) quadrant=all
          inner_radius=0.008 outer_radius=0.012
      WrapTorus EDCR: xyz_body_rotation=(1.98392 0.100531 0.523075) translation=(-0.0098 -0.0137 0.0166) quadrant=all
          inner_radius=0.0105 outer_radius=0.011
      WrapTorus EDCM: xyz_body_rotation=(1.99317 0.19792 0.368264) translation=(-0.0007 -0.0117 0.0191) quadrant=all
          inner_radius=0.009 outer_radius=0.012
      WrapTorus EDCI: xyz_body_rotation=(1.69768 0.0897099 0.00767945) translation=(0.009 -0.0149 0.0211) quadrant=all
          inner_radius=0.009 outer_radius=0.012
      WrapEllipsoid EDM: xyz_body_rotation=(2.9627 0.159349 0.117984) translation=(-0.0167 -0.0022 0.0048) quadrant=-z
          dimensions=(0.018 0.014 0.008)
      WrapEllipsoid FPL: xyz_body_rotation=(-0.16633 -0.082205 -0.0659735) translation=(0.017 -0.025 -0.0033)
          quadrant=-z dimensions=(0.016 0.01 0.01)
    Body hand: mass=0.5397971 mass_center=(-0.00301314 -0.0424993 -0.00112205) inertia_xx=0.000102041
        inertia_yy=5.565875e-5 inertia_zz=0.0001391469 inertia_xy=8.348812e-7 inertia_xz=-1.855292e-7
        inertia_yz=1.113175e-5
        meshes=(sdfast_1seg_hand_fr_c_5mc.vtp sdfast_1seg_hand_fr_c_4mc.vtp sdfast_1seg_hand_fr_c_3mc.vtp sdfast_1seg_hand_fr_c_2mc.vtp sdfast_1seg_hand_fr_c_trapezium.vtp sdfast_1seg_hand_fr_c_trapezoid.vtp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)
      CustomJoint wrist_hand: parent_body=proximal_row location_in_parent=(0.003992 -0.015054 0.002327)
          location=(0 0 0)
        Coordinate wrist_hand_r1: motion_type=rotational default_value=3.838644e-9 range=(-99999.9 99999.9)
            clamped=false
        Coordinate wrist_hand_r3: motion_type=rotational default_value=0 range=(-99999.9 99999.9) clamped=false
        SpatialTransform: axes_held_at_zero=(rotation3 translation1 translation2 translation3)
          TransformAxis rotation1: coordinates=wrist_hand_r1 axis=(0.8991357 -0.3490529 -0.2640399)
              LinearFunction(coefficients=1 0)
          TransformAxis rotation2: coordinates=wrist_hand_r3 axis=(0.9971185 0.01069999 -0.07510096)
              LinearFunction(coefficients=1 0)
      WrapCylinder _2rdmcp_FDS: xyz_body_rotation=(0.593936 1.50011 -2.16578) translation=(0.0182 -0.0659 0.0087)
          quadrant=y radius=0.013 length=0.01
      WrapCylinder _2rdmcp_FDP: xyz_body_rotation=(0.593936 1.50011 -2.23559) translation=(0.0182 -0.0659 0.0087)
          quadrant=y radius=0.0105 length=0.01
      WrapCylinder _2rdmcp_ext: xyz_body_rotation=(0.593936 1.50011 -1.99125) translation=(0.0182 -0.0659 0.0087)
          quadrant=-y radius=0.01 length=0.01
      WrapEllipsoid _2ndmcp: xyz_body_rotation=(1.48667 -1.29661 2.43072) translation=(0.0206 -0.068 0.0044)
          active=false quadrant=-x dimensions=(0.005 0.005 0.03)
      WrapCylinder _3rdmcp_FDS: xyz_body_rotation=(0.770388 1.32837 1.5708) translation=(0.0007 -0.0655 0.0092)
          quadrant=-x radius=0.013 length=0.01
      WrapCylinder _3rdmcp_FDP: xyz_body_rotation=(0.770388 1.32837 1.5708) translation=(0.0046 -0.0662 0.0099)
          quadrant=-x radius=0.0105 length=0.01
      WrapCylinder _3rdmcp_ext: xyz_body_rotation=(0.770388 1.32837 1.46608) translation=(0.0007 -0.0655 0.0092)
          quadrant=y radius=0.01 length=0.01
      WrapCylinder _4rdmcp_FDS: xyz_body_rotation=(0.858527 1.10165 -2.48535) translation=(-0.0139 -0.0642 0.0033)
          quadrant=y radius=0.013 length=0.01
      WrapCylinder _4rdmcp_FDP: xyz_body_rotation=(0.858527 1.10165 -2.48535) translation=(-0.0139 -0.0642 0.0033)
          quadrant=y radius=0.0105 length=0.01
      WrapCylinder _4rdmcp_ext: xyz_body_rotation=(0.858527 1.10165 -3.09621) translation=(-0.0139 -0.0642 0.0033)
          quadrant=x radius=0.01 length=0.01
      WrapCylinder _5rdmcp_FDS: xyz_body_rotation=(0.470541 0.975639 -2.12162) translation=(-0.0235 -0.0561 -0.0057)
          quadrant=y radius=0.013 length=0.012
      WrapCylinder _5rdmcp_FDP: xyz_body_rotation=(0.470541 0.975639 -2.34852) translation=(-0.0235 -0.0561 -0.0057)
          quadrant=y radius=0.0105 length=0.01
      WrapCylinder _5rdmcp_ext: xyz_body_rotation=(0.470541 0.975639 -1.68529) translation=(-0.0235 -0.0561 -0.0057)
          quadrant=-y radius=0.01 length=0.012
      WrapCylinder Secondpm_FDS: xyz_body_rotation=(-1.57813 1.24808 1.0259) translation=(0.0307 -0.0924 -0.0222)
          quadrant=y radius=0.0075 length=0.01
      WrapCylinder Secondpm_FDP: xyz_body_rotation=(-1.57813 1.24808 1.0259) translation=(0.0307 -0.0924 -0.0222)
          quadrant=y radius=0.008 length=0.01
      WrapCylinder Secondpm_ext: xyz_body_rotation=(-1.57813 1.24808 1.0259) translation=(0.0307 -0.0924 -0.0222)
          quadrant=-y radius=0.0055 length=0.012
      WrapCylinder Secondmd_flex: xyz_body_rotation=(-1.63171 1.34286 2.11639) translation=(0.0291 -0.0821 -0.045)
          quadrant=y radius=0.005 length=0.01
      WrapCylinder Secondmd_ext: xyz_body_rotation=(-1.63171 1.34286 2.11639) translation=(0.0291 -0.0821 -0.045)
          quadrant=-y radius=0.002 length=0.01
      WrapCylinder Secondpm: xyz_body_rotation=(2.2513 -1.37008 1.18159) translation=(0.0306 -0.0911 -0.0223)
          active=false quadrant=all radius=0.004 length=0.01
      WrapCylinder Secondmd: xyz_body_rotation=(1.35525 -1.38387 -0.557109) translation=(0.0295 -0.0815 -0.0441)
          active=false quadrant=x radius=0.003 length=0.01
      WrapCylinder MPthumb: xyz_body_rotation=(0.321315 0.11013 -0.834791) translation=(0.0402 -0.0405 -0.0271)
          quadrant=all radius=0.0085 length=0.02
      WrapCylinder IPthumb: xyz_body_rotation=(0.332136 -0.026529 -0.257611) translation=(0.0396 -0.0713 -0.0365)
          quadrant=-x radius=0.0045 length=0.01
      WrapCylinder Thirdpm_FDS: xyz_body_rotation=(-0.407883 1.45246 -0.145386) translation=(0.0122 -0.0934 -0.0238)
          quadrant=y radius=0.0075 length=0.01
      WrapCylinder Thirdpm_FDP: xyz_body_rotation=(-0.407883 1.45246 -0.145386) translation=(0.0122 -0.0934 -0.0238)
          quadrant=y radius=0.008 length=0.01
      WrapCylinder Thirdpm_ext: xyz_body_rotation=(-0.407883 1.45246 -0.145386) translation=(0.0122 -0.0934 -0.0238)
          quadrant=-y radius=0.0055 length=0.01
      WrapCylinder Thirdmd_flex: xyz_body_rotation=(0.714189 1.28282 -0.203331) translation=(0.019 -0.0814 -0.0494)
          quadrant=y radius=0.005 length=0.01
      WrapCylinder Thirdmd_ext: xyz_body_rotation=(0.714189 1.28282 -0.203331) translation=(0.019 -0.0814 -0.0494)
          quadrant=-y radius=0.002 length=0.01
      WrapCylinder Fourthpm_FDS: xyz_body_rotation=(0.696212 0.976861 -1.21876) translation=(-0.005 -0.0871 -0.0289)
          quadrant=y radius=0.0075 length=0.01
      WrapCylinder Fourthpm_FDP: xyz_body_rotation=(0.696212 0.976861 -1.21876) translation=(-0.005 -0.0871 -0.0289)
          quadrant=y radius=0.008 length=0.01
      WrapCylinder Fourthpm_ext: xyz_body_rotation=(0.696212 0.976861 -1.21876) translation=(-0.005 -0.0871 -0.0289)
          quadrant=-y radius=0.0055 length=0.01
      WrapCylinder Fourthmd_flex: xyz_body_rotation=(0.75311 0.925897 -0.167377) translation=(0.0094 -0.0778 -0.0469)
          quadrant=y radius=0.005 length=0.01
      WrapCylinder Fourthmd_ext: xyz_body_rotation=(0.75311 0.925897 -0.167377) translation=(0.0094 -0.0778 -0.0469)
          quadrant=-y radius=0.002 length=0.01
      WrapCylinder Fifthpm_FDS: xyz_body_rotation=(0.977035 0.825192 -1.51687) translation=(-0.0154 -0.0784 -0.0329)
          quadrant=y radius=0.0075 length=0.01
      WrapCylinder Fifthpm_FDP: xyz_body_rotation=(0.977035 0.825192 -1.79612) translation=(-0.0153 -0.0786 -0.0329)
          quadrant=y radius=0.008 length=0.01
      WrapCylinder Fifthpm_ext: xyz_body_rotation=(0.977035 0.825192 -1.08053) translation=(-0.0152 -0.0785 -0.0328)
          quadrant=-y radius=0.0055 length=0.01
      WrapCylinder Fifthmd_flex: xyz_body_rotation=(0.979304 0.65031 -0.620814) translation=(0.0007 -0.0741 -0.0457)
          quadrant=y radius=0.005 length=0.01
      WrapCylinder Fifthmd_ext: xyz_body_rotation=(0.979304 0.65031 -0.620814) translation=(0.007 -0.0741 -0.0457)
          quadrant=-y radius=0.002 length=0.01
  ConstraintSet:
    CoordinateCouplerConstraint [values shared by the 13 below unless stated]: independent_coordinate_names=shoulder_elv
        scale_factor=1
    CoordinateCouplerConstraint sternoclavicular_r2_con: dependent_coordinate_name=sternoclavicular_r2
      coupled_coordinates_function: SimmSpline: x=(0 2.61799) y=(0 -0.633555)
    CoordinateCouplerConstraint sternoclavicular_r3_con: dependent_coordinate_name=sternoclavicular_r3
      coupled_coordinates_function: SimmSpline: x=(0 3.14159) y=(0 0.322013)
    CoordinateCouplerConstraint unrotscap_r2_con: dependent_coordinate_name=unrotscap_r2
      coupled_coordinates_function: SimmSpline: x=(0 2.61799) y=(0 0.633555)
    CoordinateCouplerConstraint unrotscap_r3_con: dependent_coordinate_name=unrotscap_r3
      coupled_coordinates_function: SimmSpline: x=(0 3.14159) y=(0 -0.322013)
    CoordinateCouplerConstraint acromioclavicular_r1_con: dependent_coordinate_name=acromioclavicular_r1
      coupled_coordinates_function: SimmSpline: x=(0 2.61799) y=(0 0.466003)
    CoordinateCouplerConstraint acromioclavicular_r2_con: dependent_coordinate_name=acromioclavicular_r2
      coupled_coordinates_function: SimmSpline: x=(0 2.61799) y=(0 -0.128282)
    CoordinateCouplerConstraint acromioclavicular_r3_con: dependent_coordinate_name=acromioclavicular_r3
      coupled_coordinates_function: SimmSpline: x=(0 2.61799) y=(0 1.03673)
    CoordinateCouplerConstraint unrothum_r1_con: dependent_coordinate_name=unrothum_r1
      coupled_coordinates_function: SimmSpline: x=(0 2.61799) y=(0 -0.466003)
    CoordinateCouplerConstraint unrothum_r2_con: dependent_coordinate_name=unrothum_r2
      coupled_coordinates_function: SimmSpline: x=(0 2.61799) y=(0 0.128282)
    CoordinateCouplerConstraint unrothum_r3_con: dependent_coordinate_name=unrothum_r3
      coupled_coordinates_function: SimmSpline: x=(0 2.61799) y=(0 -1.03673)
    CoordinateCouplerConstraint shoulder1_r2_con: independent_coordinate_names=elv_angle
        dependent_coordinate_name=shoulder1_r2
      coupled_coordinates_function: SimmSpline: x=(-1.5708 3.14159) y=(1.5708 -3.14159)
    CoordinateCouplerConstraint wrist_hand_r1_con: independent_coordinate_names=deviation
        dependent_coordinate_name=wrist_hand_r1
      coupled_coordinates_function: SimmSpline f18: x=(-0.174533 0 0.436332) y=(-0.261799 0 0.436332)
    CoordinateCouplerConstraint wrist_hand_r3_con: independent_coordinate_names=flexion
        dependent_coordinate_name=wrist_hand_r3
      coupled_coordinates_function: SimmSpline f19: x=(-1.22173 1.22173) y=(-0.610865 0.610865)
  ForceSet:
    CoordinateLimitForce shoulder_elv_ligaments: coordinate=shoulder_elv upper_stiffness=100 [N*m/degree]
        upper_limit=150 [degrees] lower_stiffness=100 [N*m/degree] lower_limit=30 [degrees] damping=0
        transition=542.8423 [degrees]
    CoordinateLimitForce shoulder_elv_damping: coordinate=shoulder_elv upper_stiffness=1e-8 upper_limit=190
        lower_stiffness=1e-8 lower_limit=190 damping=0.001745 transition=1
    CoordinateLimitForce elv_angle_ligaments: coordinate=elv_angle upper_stiffness=100 upper_limit=100
        lower_stiffness=100 lower_limit=-60 damping=0 transition=545.4471
    CoordinateLimitForce elv_angle_damping: coordinate=elv_angle upper_stiffness=1e-8 upper_limit=190
        lower_stiffness=1e-8 lower_limit=190 damping=0.001745 transition=1
    CoordinateLimitForce shoulder_rot_ligaments: coordinate=shoulder_rot upper_stiffness=100 upper_limit=90
        lower_stiffness=100 lower_limit=-60 damping=0 transition=485.466
    CoordinateLimitForce shoulder_rot_damping: coordinate=shoulder_rot upper_stiffness=1e-8 upper_limit=190
        lower_stiffness=1e-8 lower_limit=190 damping=0.001745 transition=1
    CoordinateLimitForce elbow_flexion_ligaments: coordinate=elbow_flexion upper_stiffness=0.3037 upper_limit=85
        lower_stiffness=100 lower_limit=14 damping=0 transition=139.5813
    CoordinateLimitForce elbow_flexion_damping: coordinate=elbow_flexion upper_stiffness=1e-8 upper_limit=190
        lower_stiffness=1e-8 lower_limit=190 damping=0.001745 transition=1
    CoordinateLimitForce pro_sup_ligaments: coordinate=pro_sup upper_stiffness=50 upper_limit=60 lower_stiffness=50
        lower_limit=-60 damping=0 transition=430.1186
    CoordinateLimitForce pro_sup_damping: coordinate=pro_sup upper_stiffness=1e-8 upper_limit=190 lower_stiffness=1e-8
        lower_limit=190 damping=0.001745 transition=1
    CoordinateLimitForce deviation_ligaments: coordinate=deviation upper_stiffness=52.5961 upper_limit=20
        lower_stiffness=487.176 lower_limit=-6 damping=0 transition=39.1586
    CoordinateLimitForce deviation_damping: coordinate=deviation upper_stiffness=1e-8 upper_limit=190
        lower_stiffness=1e-8 lower_limit=190 damping=0.001745 transition=1
    CoordinateLimitForce flexion_ligaments: coordinate=flexion upper_stiffness=200 upper_limit=60
        lower_stiffness=135.3232 lower_limit=-60 damping=0 transition=92.916
    CoordinateLimitForce flexion_damping: coordinate=flexion upper_stiffness=1e-8 upper_limit=190 lower_stiffness=1e-8
        lower_limit=190 damping=0.00043633 transition=1
    Millard2012EquilibriumMuscle [values shared by the 50 below unless stated]: min_control=0 max_control=1
        max_contraction_velocity=10 default_activation=1 minimum_activation=0.01
      ActiveForceLengthCurve: min_norm_active_fiber_length=0.4327 transition_norm_fiber_length=0.728
          max_norm_active_fiber_length=1.595 shallow_ascending_slope=0.4613 minimum_value=0
      ForceVelocityCurve: concentric_slope_at_vmax=0 concentric_slope_near_vmax=0.25 isometric_slope=5
          eccentric_slope_at_vmax=0 eccentric_slope_near_vmax=0.15 max_eccentric_velocity_force_multiplier=1.4
      FiberForceLengthCurve: strain_at_zero_force=0 strain_at_one_norm_force=0.6405 stiffness_at_low_force=0.0751
          stiffness_at_one_norm_force=6.3163 curviness=0.6658
      TendonForceLengthCurve: strain_at_one_norm_force=0.033 stiffness_at_one_norm_force=37.393
          norm_force_at_toe_end=0.2255 curviness=0.4504
    Millard2012EquilibriumMuscle DELT1: max_isometric_force=1218.9 optimal_fiber_length=0.09719106
        tendon_slack_length=0.09261033 pennation_angle_at_optimal=0.3839724 [radians]
      PathPoint P1: humerus (0.00878256 -0.116477 0.00573415)
      PathPoint P2: humerus (0.0159086 -0.108145 0.00403841)
      PathPoint P3: scapula (0.0426091 -0.0313859 0.00489118)
      PathPoint P4: clavicle (-0.0148316 0.011717 0.0849746)
      PathWrap: wrap_object=delt2hum method=hybrid
      PathWrap: wrap_object=DELT1hh method=hybrid range=(2 3)
    Millard2012EquilibriumMuscle DELT2: max_isometric_force=1103.5 optimal_fiber_length=0.1056651
        tendon_slack_length=0.1073314 pennation_angle_at_optimal=0.2617994
      PathPoint P1: humerus (0.0045187 -0.133414 0.0054891)
      MovingPathPoint default: humerus (0.0073518 -0.0592734 0.0266259) x_coordinate=shoulder_rot
          y_coordinate=shoulder_rot z_coordinate=shoulder_rot
        x_location: MultiplierFunction: scale=0.9801961 PiecewiseLinearFunction(x=-1.5708 0.349066, y=0.03804 0)
        y_location: MultiplierFunction: scale=0.9801961 PiecewiseLinearFunction(x=-1.5708 0.349066, y=-0.0619 -0.06012)
        z_location: MultiplierFunction: scale=0.9801961
          SimmSpline: x=(-1.5708 -0.851248 0.349066) y=(0.00208 0.0203027 0.02532)
      PathPoint P3: scapula (4.90098e-5 0.00288178 0.0218878)
      PathPoint P4: scapula (-0.0105665 -0.000333267 0.00607722)
      PathWrap: wrap_object=Deltoid2 method=hybrid
      PathWrap: wrap_object=delt2hum method=hybrid
      PathWrap: wrap_object=DELT_TMAJ_LAT_PEC_CORBhh method=hybrid
    Millard2012EquilibriumMuscle DELT3: max_isometric_force=201.6 optimal_fiber_length=0.1339928
        tendon_slack_length=0.03724745 pennation_angle_at_optimal=0.3141593
      PathPoint P1: scapula (-0.0546263 0.00119584 -0.0246225)
      PathPoint P2: scapula (-0.0710348 -0.0321994 0.0120858)
      PathPoint P3: humerus (0.0020192 -0.0745145 0.010243)
      PathWrap: wrap_object=Delt3 method=hybrid range=(1 2)
      PathWrap: wrap_object=delt3hum method=hybrid
      PathWrap: wrap_object=DELT_TMAJ_LAT_PEC_CORBhh method=hybrid
    Millard2012EquilibriumMuscle SUPSP: max_isometric_force=499.2 optimal_fiber_length=0.06684937
        tendon_slack_length=0.03871775 pennation_angle_at_optimal=0.1221731
      PathPoint P1: humerus (0.0025093 0.0104195 0.0254165)
      PathPoint P2: scapula (-0.0188002 0.00124485 -0.0124583)
      PathPoint P3: scapula (-0.0431286 -0.0148206 -0.0573905)
      PathWrap: wrap_object=SUPSP method=hybrid
    Millard2012EquilibriumMuscle INFSP: max_isometric_force=1075.8 optimal_fiber_length=0.07400481
        tendon_slack_length=0.03019004 pennation_angle_at_optimal=0.3316126
      PathPoint P1: humerus (-0.00869434 0.00474415 0.0239952)
      PathPoint P2: scapula (-0.0723581 -0.0536755 -0.0468632)
      PathWrap: wrap_object=INFSP method=hybrid
      PathWrap: wrap_object=infsp_new method=hybrid
    Millard2012EquilibriumMuscle SUBSC: max_isometric_force=1306.9 optimal_fiber_length=0.08557112
        tendon_slack_length=0.03234647 pennation_angle_at_optimal=0.3490659
      PathPoint P1: humerus (0.0137522 0.00823365 -0.0130464)
      PathPoint P2: scapula (-0.0179474 -0.0511956 -0.0240834)
      PathPoint P3: scapula (-0.071025 -0.0386491 -0.0634677)
      PathWrap: wrap_object=SUBSCAP method=hybrid
    Millard2012EquilibriumMuscle TMIN: max_isometric_force=269.5 optimal_fiber_length=0.07263253
        tendon_slack_length=0.06988798 pennation_angle_at_optimal=0.418879
      PathPoint P1: humerus (-0.00124485 -0.0123407 0.0215643)
      PathPoint P2: scapula (-0.092854 -0.0783275 -0.0464319)
      PathPoint P3: scapula (-0.0945203 -0.0796017 -0.0519308)
      PathWrap: wrap_object=TMIN method=hybrid range=(1 2)
      PathWrap: wrap_object=INFSP_and_TMIN_hum_head method=hybrid range=(1 2)
      PathWrap: wrap_object=TMINhum method=hybrid range=(1 2)
    Millard2012EquilibriumMuscle TMAJ: max_isometric_force=144 optimal_fiber_length=0.1591838
        tendon_slack_length=0.01960392 pennation_angle_at_optimal=0.2792527
      PathPoint P1: humerus (0.00978236 -0.0531168 -0.00556751)
      ConditionalPathPoint default: humerus (0.00882176 -0.0529306 -0.00882176) range=(0.261799 2.0944)
          coordinate=shoulder_rot
      ConditionalPathPoint default: humerus (0.00882176 -0.0529306 -0.00882176) range=(-1.65806 -0.174533)
          coordinate=elv_angle
      PathPoint P2: scapula (-0.100607 -0.101146 -0.0571356)
      PathPoint P3: scapula (-0.102813 -0.106792 -0.0697606)
      PathWrap: wrap_object=TMAJ_LAThum method=hybrid
      PathWrap: wrap_object=LAT_TMAJhh method=hybrid range=(1 4)
      PathWrap: wrap_object=LAT_TMAJ2hh method=hybrid
    Millard2012EquilibriumMuscle PECM1: max_isometric_force=444.3 optimal_fiber_length=0.1464144
        tendon_slack_length=0.002842998 pennation_angle_at_optimal=0.296706 ignore_tendon_compliance=true
      PathPoint P1: humerus (0.0114585 -0.04108 0.00764553)
      MovingPathPoint default: humerus (0.0172433 -0.0346909 -0.00220667) x_coordinate=shoulder_elv
          y_coordinate=shoulder_elv z_coordinate=shoulder_elv
        x_location: MultiplierFunction: scale=0.9801961 PiecewiseLinearFunction(x=0 3.14159, y=0.01615 0.02205)
        y_location: MultiplierFunction: scale=0.9801961 PiecewiseLinearFunction(x=0 3.14159, y=-0.04045 -0.01975)
        z_location: MultiplierFunction: scale=0.9801961 PiecewiseLinearFunction(x=0 3.14159, y=-0.00577 0.00863)
      MovingPathPoint default: thorax (0.0048639 -0.00370295 0.115839) x_coordinate=shoulder_elv
          y_coordinate=shoulder_elv z_coordinate=shoulder_elv
        x_location: MultiplierFunction: scale=1 PiecewiseLinearFunction(x=0 3.14159, y=0.00958 -0.00972)
        y_location: MultiplierFunction: scale=1 PiecewiseLinearFunction(x=0 3.14159, y=-0.01509 0.03151)
        z_location: MultiplierFunction: scale=1 PiecewiseLinearFunction(x=0 3.14159, y=0.12664 0.08244)
      PathPoint P2: clavicle (0.00340068 -0.000137722 0.0541672)
      PathWrap: wrap_object=Thorax method=hybrid
      PathWrap: wrap_object=PEC12hum method=hybrid range=(2 3)
      PathWrap: wrap_object=PEC1hh method=hybrid
    Millard2012EquilibriumMuscle PECM2: max_isometric_force=658.3 optimal_fiber_length=0.1438094
        tendon_slack_length=0.09241179 pennation_angle_at_optimal=0.4537856
      PathPoint P1: humerus (0.0124877 -0.0420406 0.00769454)
      MovingPathPoint default: humerus (0.0156554 -0.0398173 -0.00328489) x_coordinate=shoulder_elv
          y_coordinate=shoulder_elv z_coordinate=shoulder_elv
        x_location: MultiplierFunction: scale=0.9801961 PiecewiseLinearFunction(x=0 3.14159, y=0.01453 0.02043)
        y_location: MultiplierFunction: scale=0.9801961 PiecewiseLinearFunction(x=0 3.14159, y=-0.04568 -0.02498)
        z_location: MultiplierFunction: scale=0.9801961 PiecewiseLinearFunction(x=0 3.14159, y=-0.00687 0.00753)
      MovingPathPoint default: thorax (0.0204977 -0.0310938 0.121353) x_coordinate=shoulder_elv
          y_coordinate=shoulder_elv z_coordinate=shoulder_elv
        x_location: MultiplierFunction: scale=1 PiecewiseLinearFunction(x=0 3.14159, y=0.02018 0.02148)
        y_location: MultiplierFunction: scale=1 PiecewiseLinearFunction(x=0 3.14159, y=-0.04165 0.00155)
        z_location: MultiplierFunction: scale=1 PiecewiseLinearFunction(x=0 3.14159, y=0.1269 0.1042)
      PathPoint P4: thorax (0.03091 -0.03922 0.09705)
      PathPoint P5: thorax (0.02769 -0.04498 0.02271)
      PathWrap: wrap_object=Thorax method=hybrid
      PathWrap: wrap_object=PEC12hum method=hybrid range=(2 3)
      PathWrap: wrap_object=TMAJ_LAT_PEC_CORBhh method=hybrid
      PathWrap: wrap_object=PEC23hh method=hybrid
    Millard2012EquilibriumMuscle PECM3: max_isometric_force=498.1 optimal_fiber_length=0.1438128
        tendon_slack_length=0.1370634 pennation_angle_at_optimal=0.4363323
      PathPoint P1: humerus (0.0124387 -0.0428836 0.00735147)
      MovingPathPoint default: humerus (0.0146731 -0.0477916 -0.00633976) x_coordinate=shoulder_elv
          y_coordinate=shoulder_elv z_coordinate=shoulder_elv
        x_location: MultiplierFunction: scale=0.9801961
          SimmSpline: x=(0 0.747517 3.14159) y=(0.01243 0.014912 0.01833)
        y_location: MultiplierFunction: scale=0.9801961 PiecewiseLinearFunction(x=0 3.13149, y=-0.05157 -0.040096)
        z_location: MultiplierFunction: scale=0.9801961
          SimmSpline: x=(0 0.623056 2.29124 3.12533) y=(-0.01807 -0.008102 0.000123 -0.000324)
      MovingPathPoint default: thorax (0.02984 -0.0683989 0.1151) x_coordinate=shoulder_elv y_coordinate=shoulder_elv
          z_coordinate=shoulder_elv
        x_location: MultiplierFunction: scale=1 PiecewiseLinearFunction(x=0 3.14159, y=0.02984 0.02984)
        y_location: MultiplierFunction: scale=1
          SimmSpline: x=(0.0101016 1.59605 3.14159) y=(-0.070778 -0.059781 -0.0269)
        z_location: MultiplierFunction: scale=1 PiecewiseLinearFunction(x=0 3.14159, y=0.1151 0.1151)
      PathPoint P4: thorax (0.0525 -0.08417 0.08935)
      PathPoint P5: thorax (0.05724 -0.11654 0.03787)
      PathWrap: wrap_object=Thorax method=hybrid
      PathWrap: wrap_object=PEC3hum method=hybrid range=(2 3)
      PathWrap: wrap_object=PEC23hh method=hybrid
    Millard2012EquilibriumMuscle LAT1: max_isometric_force=290.5 optimal_fiber_length=0.2610306
        tendon_slack_length=0.1233216 pennation_angle_at_optimal=0.4363323
      PathPoint P1: humerus (0.0102921 -0.0334737 -0.00640068)
      ConditionalPathPoint default: humerus (0.00980196 -0.0343069 -0.00871711) range=(0.523599 2.0944)
          coordinate=shoulder_rot
      ConditionalPathPoint default: humerus (0.00980196 -0.0343069 -0.00882176) range=(-1.65806 -0.174533)
          coordinate=elv_angle
      MovingPathPoint default: scapula (-0.0783992 -0.0756796 -0.0248958) x_coordinate=shoulder_elv
          y_coordinate=shoulder_elv z_coordinate=shoulder_elv
        x_location: MultiplierFunction: scale=0.9801961 PiecewiseLinearFunction(x=0 3.14159, y=-0.07947 -0.08157)
        y_location: MultiplierFunction: scale=0.9801961 PiecewiseLinearFunction(x=0 3.14159, y=-0.08581 -0.05061)
        z_location: MultiplierFunction: scale=0.9801961 PiecewiseLinearFunction(x=0 3.14159, y=-0.02188 -0.03628)
      MovingPathPoint default: scapula (-0.10854 -0.0836859 -0.0622258) x_coordinate=shoulder_elv
          y_coordinate=shoulder_elv z_coordinate=shoulder_elv
        x_location: MultiplierFunction: scale=0.9801961 PiecewiseLinearFunction(x=0 3.14159, y=-0.11215 -0.10635)
        y_location: MultiplierFunction: scale=0.9801961 PiecewiseLinearFunction(x=0 3.14159, y=-0.09779 -0.04699)
        z_location: MultiplierFunction: scale=0.9801961 PiecewiseLinearFunction(x=0 3.14159, y=-0.05322 -0.09522)
      PathPoint P4: thorax (-0.11828 -0.10118 0.03316)
      PathPoint P5: thorax (-0.09578 -0.11724 0.00882)
      PathWrap: wrap_object=TMAJ_LAThum method=hybrid
      PathWrap: wrap_object=LAT_TMAJhh method=hybrid range=(1 4)
      PathWrap: wrap_object=LAT_TMAJ2hh method=hybrid
    Millard2012EquilibriumMuscle LAT2: max_isometric_force=317.5 optimal_fiber_length=0.2380353
        tendon_slack_length=0.1807798 pennation_angle_at_optimal=0.3316126
      PathPoint P1: humerus (0.0094883 -0.0399038 -0.005989)
      ConditionalPathPoint default: humerus (0.00784157 -0.0421484 -0.00980196) range=(0.349066 2.0944)
          coordinate=shoulder_rot
      ConditionalPathPoint default: humerus (0.00784107 -0.0425269 -0.00989714) range=(-1.65806 -0.174533)
          coordinate=elv_angle
      MovingPathPoint default: scapula (-0.0782642 -0.0928707 -0.0208117) x_coordinate=shoulder_elv
          y_coordinate=shoulder_elv z_coordinate=shoulder_elv
        x_location: MultiplierFunction: scale=0.9801961 PiecewiseLinearFunction(x=0 3.14159, y=-0.0764 -0.0905)
        y_location: MultiplierFunction: scale=0.9801961 PiecewiseLinearFunction(x=0 3.14159, y=-0.1022 -0.0717)
        z_location: MultiplierFunction: scale=0.9801961 PiecewiseLinearFunction(x=0 3.14159, y=-0.01808 -0.03098)
      MovingPathPoint default: scapula (-0.105591 -0.121499 -0.068808) x_coordinate=shoulder_elv
          y_coordinate=shoulder_elv z_coordinate=shoulder_elv
        x_location: MultiplierFunction: scale=0.9801961 PiecewiseLinearFunction(x=0 3.14159, y=-0.10054 -0.12994)
        y_location: MultiplierFunction: scale=0.9801961 PiecewiseLinearFunction(x=0 3.14159, y=-0.13969 -0.07529)
        z_location: MultiplierFunction: scale=0.9801961 PiecewiseLinearFunction(x=0 3.14159, y=-0.05258 -0.12468)
      PathPoint P4: thorax (-0.10992 -0.16908 0.02878)
      PathPoint P5: thorax (-0.07186 -0.18818 0.00815)
      PathWrap: wrap_object=TMAJ_LAThum method=hybrid
      PathWrap: wrap_object=LAT_TMAJhh method=hybrid range=(1 4)
      PathWrap: wrap_object=LAT_TMAJ2hh method=hybrid
    Millard2012EquilibriumMuscle LAT3: max_isometric_force=189 optimal_fiber_length=0.2852637
        tendon_slack_length=0.1435012 pennation_angle_at_optimal=0.3665191
      PathPoint P1: humerus (0.0118408 -0.0384433 -0.00407762)
      ConditionalPathPoint default: humerus (0.00980196 -0.040188 -0.00882176) range=(0.174533 2.0944)
          coordinate=shoulder_rot
      ConditionalPathPoint default: humerus (0.00980196 -0.040188 -0.00882176) range=(-1.65806 -0.0872665)
          coordinate=elv_angle
      MovingPathPoint default: scapula (-0.0688769 -0.122228 -0.0250218) x_coordinate=shoulder_elv
          y_coordinate=shoulder_elv z_coordinate=shoulder_elv
        x_location: MultiplierFunction: scale=0.9801961 PiecewiseLinearFunction(x=0 3.14159, y=-0.05678 -0.11198)
        y_location: MultiplierFunction: scale=0.9801961 PiecewiseLinearFunction(x=0 3.14159, y=-0.13303 -0.09893)
        z_location: MultiplierFunction: scale=0.9801961 PiecewiseLinearFunction(x=0 3.14159, y=-0.0213 -0.0386)
      MovingPathPoint default: scapula (-0.101385 -0.154234 -0.064768) x_coordinate=shoulder_elv
          y_coordinate=shoulder_elv z_coordinate=shoulder_elv
        x_location: MultiplierFunction: scale=0.9801961 PiecewiseLinearFunction(x=0 3.14159, y=-0.09449 -0.13109)
        y_location: MultiplierFunction: scale=0.9801961 PiecewiseLinearFunction(x=0 3.14159, y=-0.17553 -0.10113)
        z_location: MultiplierFunction: scale=0.9801961 PiecewiseLinearFunction(x=0 3.14159, y=-0.04406 -0.13416)
      PathPoint P4: thorax (-0.11157 -0.19387 0.05532)
      PathPoint P5: thorax (-0.07117 -0.24858 0.00907)
      PathWrap: wrap_object=TMAJ_LAThum method=hybrid
      PathWrap: wrap_object=LAT_TMAJhh method=hybrid range=(1 4)
      PathWrap: wrap_object=LAT_TMAJ2hh method=hybrid
    Millard2012EquilibriumMuscle CORB: max_isometric_force=208.2 optimal_fiber_length=0.09135428
        tendon_slack_length=0.09507902 pennation_angle_at_optimal=0.4712389
      PathPoint P1: scapula (0.0122525 -0.0404527 -0.0259948)
      PathPoint P2: scapula (0.00473435 -0.068202 -0.0153205)
      PathPoint P3: humerus (0.00728286 -0.1475 -0.00766513)
      PathWrap: wrap_object=CORBhum method=hybrid
      PathWrap: wrap_object=TMAJ_LAT_PEC_CORBhh method=hybrid
    Millard2012EquilibriumMuscle TRIlong: max_isometric_force=771.8 optimal_fiber_length=0.1308551
        tendon_slack_length=0.1396439 pennation_angle_at_optimal=0.2094395
      PathPoint P1: scapula (-0.044746 -0.0399234 -0.0134973)
      PathPoint P2: humerus (-0.0266025 -0.112144 -0.0065085)
      PathPoint P3: humerus (-0.0312094 -0.221887 -0.011929)
      PathPoint P4: humerus (-0.0170848 -0.262271 -0.0118408)
      PathPoint P5: ulna (-0.0234095 0.011181 -0.000833763)
      PathWrap: wrap_object=TRI method=hybrid
      PathWrap: wrap_object=TRIlonghh method=hybrid
      PathWrap: wrap_object=TRIlongglen method=hybrid range=(1 2)
    Millard2012EquilibriumMuscle TRIlat: max_isometric_force=717.5 optimal_fiber_length=0.1108513
        tendon_slack_length=0.0954607 pennation_angle_at_optimal=0.1570796
      PathPoint P1: humerus (-0.00587137 -0.123956 0.00419524)
      PathPoint P2: humerus (-0.0229758 -0.142403 0.00909622)
      PathPoint P3: humerus (-0.0312094 -0.221887 -0.011929)
      PathPoint P4: humerus (-0.0170848 -0.262271 -0.0118408)
      PathPoint P5: ulna (-0.0234095 0.011181 -0.000833763)
      PathWrap: wrap_object=TRI method=hybrid
    Millard2012EquilibriumMuscle TRImed: max_isometric_force=717.5 optimal_fiber_length=0.1107956
        tendon_slack_length=0.08840278 pennation_angle_at_optimal=0.1570796
      PathPoint P1: humerus (-0.00821404 -0.134238 -0.00888058)
      PathPoint P2: humerus (-0.0254949 -0.148392 -0.0105861)
      PathPoint P3: humerus (-0.0312094 -0.221887 -0.011929)
      PathPoint P4: humerus (-0.0170848 -0.262271 -0.0118408)
      PathPoint P5: ulna (-0.0234095 0.011181 -0.000833763)
      PathWrap: wrap_object=TRI method=hybrid
    Millard2012EquilibriumMuscle ANC: max_isometric_force=283.2 optimal_fiber_length=0.02769271
        tendon_slack_length=0.01846181 pennation_angle_at_optimal=0
      PathPoint P1: humerus (-0.00729266 -0.277974 0.00959612)
      PathPoint P2: ulna (-0.0270652 -0.00132547 0.00641356)
      PathWrap: wrap_object=ANC method=hybrid
    Millard2012EquilibriumMuscle SUP: max_isometric_force=379.6 optimal_fiber_length=0.0352746
        tendon_slack_length=0.02992996 pennation_angle_at_optimal=0
      PathPoint P1: radius (0.0106465 -0.0651618 0.000801695)
      PathPoint P2: radius (0.0128378 -0.0552635 -0.00114375)
      PathPoint P3: ulna (-0.0145374 -0.0361725 0.0215175)
      PathWrap: wrap_object=SUP method=hybrid
    Millard2012EquilibriumMuscle BIClong: max_isometric_force=525.1 optimal_fiber_length=0.1147844
        tendon_slack_length=0.2701452 pennation_angle_at_optimal=0
      PathPoint P1: scapula (-0.0306115 -0.023064 -0.0127916)
      PathPoint P2: scapula (-0.0205253 -0.0128308 -0.0045187)
      PathPoint P3: humerus (0.020888 0.0175749 0.0100764)
      PathPoint P4: humerus (0.0233091 -0.0050088 0.0117722)
      PathPoint P5: humerus (0.0131836 -0.0277101 0.00133307)
      PathPoint P6: humerus (0.0104685 -0.075828 -0.00161732)
      PathPoint P7: humerus (0.0166927 -0.118849 0.000235247)
      PathPoint P8: humerus (0.0223485 -0.171926 -0.00617524)
      MovingPathPoint default: radius (0.00155018 -0.0362873 -0.0143524) x_coordinate=pro_sup y_coordinate=pro_sup
          z_coordinate=pro_sup
        x_location: MultiplierFunction: scale=1.068927
          SimmSpline: x=(-1.57561 1.57823) y=(-0.0055 0.01096)
        y_location: MultiplierFunction: scale=1.068927
          PiecewiseLinearFunction: x=(-1.57561 0 1.57561) y=(-0.0282 -0.035 -0.0392)
        z_location: MultiplierFunction: scale=1.068927
          SimmSpline: x=(-1.57561 0.0866167 1.57561) y=(-0.01 -0.01358 -0.01083)
      PathPoint P11: radius (-0.00213785 -0.0400848 -0.00213785)
      PathWrap: wrap_object=Elbow_BIC_BRD method=hybrid
      PathWrap: wrap_object=BIClong method=hybrid range=(2 5)
    Millard2012EquilibriumMuscle BICshort: max_isometric_force=316.8 optimal_fiber_length=0.1314162
        tendon_slack_length=0.1913046 pennation_angle_at_optimal=0
      PathPoint P1: scapula (0.0124289 -0.0385315 -0.0257301)
      PathPoint P2: scapula (0.000911582 -0.0657123 -0.0156145)
      PathPoint P3: humerus (0.0109488 -0.0742597 -0.010792)
      PathPoint P4: humerus (0.0166927 -0.118849 -0.0105763)
      PathPoint P5: humerus (0.0223485 -0.171926 -0.00617524)
      MovingPathPoint default: radius (0.00155018 -0.0362873 -0.0143524) x_coordinate=pro_sup y_coordinate=pro_sup
          z_coordinate=pro_sup
        x_location: MultiplierFunction: scale=1.068927
          SimmSpline: x=(-1.57561 1.57823) y=(-0.0055 0.01096)
        y_location: MultiplierFunction: scale=1.068927
          PiecewiseLinearFunction: x=(-1.57561 0 1.57561) y=(-0.0282 -0.035 -0.0392)
        z_location: MultiplierFunction: scale=1.068927
          SimmSpline: x=(-1.57561 0.0866167 1.57561) y=(-0.01 -0.01358 -0.01083)
      PathPoint P8: radius (-0.00213785 -0.0400848 -0.00213785)
      PathWrap: wrap_object=Elbow_BIC_BRD method=hybrid
    Millard2012EquilibriumMuscle BRA: max_isometric_force=1177.37 optimal_fiber_length=0.08536749
        tendon_slack_length=0.05323031 pennation_angle_at_optimal=0
      PathPoint P1: humerus (0.00666533 -0.170456 -0.00352871)
      ConditionalPathPoint P2: humerus (0.0185649 -0.279934 -0.0108312) range=(0 0.813149) coordinate=elbow_flexion
      ConditionalPathPoint P3: ulna (0.00532326 -0.0156384 0.00136823) range=(0 0.813149) coordinate=elbow_flexion
      PathPoint P4: ulna (-0.00342057 -0.0255474 0.000962035)
    Millard2012EquilibriumMuscle BRD: max_isometric_force=276 optimal_fiber_length=0.1803028
        tendon_slack_length=0.1389355 pennation_angle_at_optimal=0
      PathPoint P1: humerus (-0.00960592 -0.195677 0.00218584)
      PathPoint P2: radius (0.0382355 -0.136203 0.0247457)
      PathPoint P3: radius (0.0447881 -0.236233 0.023944)
      PathWrap: wrap_object=Elbow_BIC_BRD method=hybrid
    Millard2012EquilibriumMuscle ECRL: max_isometric_force=337.3 optimal_fiber_length=0.08522425
        tendon_slack_length=0.2567249 pennation_angle_at_optimal=0
      PathPoint P1: humerus (-0.00715543 -0.255733 0.00891978)
      PathPoint P2: radius (0.0341522 -0.14391 0.0297055)
      PathPoint P3: radius (0.0453546 -0.253165 0.0386952)
      PathPoint P4: hand (0.01717 -0.02122 0.00583)
      PathWrap: wrap_object=Elbow_PT_ECRL method=hybrid
      PathWrap: wrap_object=ECRL method=hybrid
    Millard2012EquilibriumMuscle ECRB: max_isometric_force=252.5 optimal_fiber_length=0.06223824
        tendon_slack_length=0.2365053 pennation_angle_at_optimal=0.1570796
      PathPoint P1: humerus (0.0132228 -0.284727 0.0166437)
      PathPoint P2: radius (0.0310523 -0.13988 0.0254939)
      PathPoint P3: radius (0.0379362 -0.243769 0.0420837)
      PathPoint P4: hand (0.005 -0.01136 0.0085)
      PathWrap: wrap_object=ECRB method=hybrid
    Millard2012EquilibriumMuscle ECU: max_isometric_force=192.9 optimal_fiber_length=0.06623042
        tendon_slack_length=0.2433063 pennation_angle_at_optimal=0.0698132
      PathPoint P1: humerus (0.000813563 -0.283816 0.0184277)
      PathPoint P2: ulna (-0.0148688 -0.0342164 0.0315013)
      PathPoint P3: ulna (-0.0182252 -0.0580214 0.0306568)
      PathPoint P4: ulna (-0.0191659 -0.102328 0.0350394)
      PathPoint P5: radius (-0.0151895 -0.242604 0.0372094)
      PathPoint P6: hand (-0.02251 -0.01401 -0.00128)
      PathWrap: wrap_object=ECU method=hybrid
    Millard2012EquilibriumMuscle FCR: max_isometric_force=407.9 optimal_fiber_length=0.06630943
        tendon_slack_length=0.2576354 pennation_angle_at_optimal=0.0523599
      PathPoint P1: humerus (0.00742989 -0.272553 -0.0363163)
      PathPoint P2: radius (0.0225544 -0.234555 0.00135754)
      PathPoint P3: hand (0.01124 -0.01844 -0.00418)
      PathWrap: wrap_object=Elbow_PT_ECRL method=hybrid
      PathWrap: wrap_object=FCR method=hybrid
    Millard2012EquilibriumMuscle FCU: max_isometric_force=479.8 optimal_fiber_length=0.0536591
        tendon_slack_length=0.2793647 pennation_angle_at_optimal=0.2094395
      PathPoint P1: humerus (0.00214663 -0.271906 -0.0380316)
      MovingPathPoint P2: radius (0.00885682 -0.196901 0.00116909) x_coordinate=pro_sup y_coordinate=pro_sup
          z_coordinate=pro_sup
        x_location: MultiplierFunction: scale=1.068927
          SimmSpline: x=(-1.5708 0 1.5708) y=(0.00279 0.00949 0.01869)
        y_location: MultiplierFunction: scale=1.068927
          SimmSpline: x=(-1.5708 0 1.5708) y=(-0.1838 -0.1841 -0.1821)
        z_location: MultiplierFunction: scale=1.068927
          SimmSpline: x=(-1.5708 0 1.5708) y=(0.0069 0.0005 0.0002)
      PathPoint P3: radius (0.0115658 -0.238659 0.0103579)
      PathPoint P4: hand (-0.02036 -0.01765 -0.00752)
      PathWrap: wrap_object=FCU method=hybrid
      PathWrap: wrap_object=Elbow_PT_ECRL method=hybrid
    Millard2012EquilibriumMuscle PL: max_isometric_force=101 optimal_fiber_length=0.06713667
        tendon_slack_length=0.2834893 pennation_angle_at_optimal=0.06981317
      PathPoint P1: humerus (0.0044795 -0.26974 -0.0378846)
      PathPoint P2: radius (0.0270545 -0.255634 -0.00295024)
      PathPoint P3: hand (0.00917 -0.01898 -0.01754)
      PathPoint P4: hand (0.00227 -0.03096 0.00493)
      PathWrap: wrap_object=PL method=hybrid
      PathWrap: wrap_object=Elbow_PT_ECRL method=hybrid
    Millard2012EquilibriumMuscle PT: max_isometric_force=557.2 optimal_fiber_length=0.05185588
        tendon_slack_length=0.1032902 pennation_angle_at_optimal=0.1745329
      PathPoint P1: humerus (0.00352871 -0.270436 -0.0357772)
      PathPoint P2: ulna (0.00904312 -0.0360549 -0.015307)
      MovingPathPoint P3: ulna (0.014134 -0.0689376 -0.00113762) x_coordinate=pro_sup y_coordinate=pro_sup
          z_coordinate=pro_sup
        x_location: MultiplierFunction: scale=1.068927 PiecewiseLinearFunction(x=-1.5708 1.5708, y=0.01884 0.00554)
        y_location: MultiplierFunction: scale=1.068927
          SimmSpline: x=(-1.5708 1.5708) y=(-0.06086 -0.06946)
        z_location: MultiplierFunction: scale=1.068927
          SimmSpline: x=(-1.5708 1.5708) y=(0.00506 -0.00944)
      ConditionalPathPoint P4: radius (0.0252267 -0.0998378 0.0100479) range=(-1.5708 0.509636) coordinate=pro_sup
      PathPoint P5: radius (0.0271508 -0.116299 0.0211648)
      PathWrap: wrap_object=Elbow_PT_ECRL method=hybrid
    Millard2012EquilibriumMuscle PQ: max_isometric_force=284.7 optimal_fiber_length=0.03014375
        tendon_slack_length=0.005344636 pennation_angle_at_optimal=0.1745329
      PathPoint P1: radius (0.0346867 -0.213764 0.0209724)
      PathPoint P2: ulna (0.00206303 -0.224175 0.0388234)
      PathWrap: wrap_object=PQ2 method=hybrid
      PathWrap: wrap_object=PQ1 method=hybrid
    Millard2012EquilibriumMuscle FDSL: max_isometric_force=75.3 optimal_fiber_length=0.05376796
        tendon_slack_length=0.3535113 pennation_angle_at_optimal=0.08726646
      PathPoint P1: humerus (0.00412663 -0.270515 -0.0378748)
      PathPoint P2: radius (0.0147191 -0.200082 0.0021913)
      PathPoint P3: hand (-0.00235 -0.01393 -0.01376)
      PathPoint P4: hand (-0.01995 -0.04281 -0.00742)
      PathPoint P5: hand (-0.02044 -0.05981 -0.01878)
      PathPoint P6: hand (-0.01713 -0.07245 -0.02753)
      PathPoint P7: hand (-0.01156 -0.07271 -0.03656)
      PathPoint P8: hand (-0.01059 -0.07271 -0.03796)
      PathWrap: wrap_object=FDS method=hybrid
      PathWrap: wrap_object=Elbow_PT_ECRL method=hybrid
      PathWrap: wrap_object=_5rdmcp_FDS method=hybrid range=(4 5)
      PathWrap: wrap_object=Fifthpm_FDS method=hybrid range=(6 7)
    Millard2012EquilibriumMuscle FDSR: max_isometric_force=171.2 optimal_fiber_length=0.0767583
        tendon_slack_length=0.3420751 pennation_angle_at_optimal=0.06981317
      PathPoint P1: humerus (0.00469514 -0.273279 -0.0365711)
      PathPoint P2: radius (0.0167928 -0.199526 0.00285404)
      PathPoint P3: hand (-0.00082 -0.01344 -0.01359)
      PathPoint P4: hand (-0.00977 -0.05179 4e-5)
      PathPoint P5: hand (-0.01323 -0.0667 -0.0102)
      PathPoint P6: hand (-0.00788 -0.08027 -0.02503)
      PathPoint P7: hand (-0.00299 -0.08125 -0.03395)
      PathPoint P8: hand (0.00062 -0.08092 -0.03892)
      PathWrap: wrap_object=FDS method=hybrid
      PathWrap: wrap_object=Elbow_PT_ECRL method=hybrid
      PathWrap: wrap_object=_4rdmcp_FDS method=hybrid range=(4 5)
      PathWrap: wrap_object=Fourthpm_FDS method=hybrid range=(6 7)
    Millard2012EquilibriumMuscle FDSM: max_isometric_force=258.8 optimal_fiber_length=0.07814994
        tendon_slack_length=0.3078002 pennation_angle_at_optimal=0.1221731
      PathPoint P1: ulna (-0.00715112 -0.029 -0.00204165)
      PathPoint P2: radius (0.0202989 -0.199954 0.00453225)
      PathPoint P3: hand (0.0068 -0.01377 -0.01399)
      PathPoint P4: hand (0.00471 -0.03332 -0.00132)
      PathPoint P5: hand (0.00542 -0.0566 0.0006)
      PathPoint P6: hand (0.00555 -0.07224 -0.00338)
      PathPoint P7: hand (0.01167 -0.0881 -0.0167)
      PathPoint P8: hand (0.01301 -0.0887 -0.02977)
      PathPoint P9: hand (0.01568 -0.08577 -0.03765)
      PathWrap: wrap_object=FDS method=hybrid
      PathWrap: wrap_object=_3rdmcp_FDS method=hybrid range=(5 6)
      PathWrap: wrap_object=Thirdpm_FDS method=hybrid range=(7 8)
    Millard2012EquilibriumMuscle FDSI: max_isometric_force=162.5 optimal_fiber_length=0.08718223
        tendon_slack_length=0.2871271 pennation_angle_at_optimal=0.1047198
      PathPoint P1: ulna (-0.00722595 -0.0301331 -0.00146443)
      PathPoint P2: radius (0.0229285 -0.199066 0.00590048)
      PathPoint P3: hand (0.00889 -0.01366 -0.01387)
      PathPoint P4: hand (0.01061 -0.03787 0.00024)
      PathPoint P5: hand (0.01782 -0.05108 0.00418)
      PathPoint P6: hand (0.01849 -0.07297 -0.00375)
      PathPoint P7: hand (0.02678 -0.08714 -0.01804)
      PathPoint P8: hand (0.02667 -0.0874 -0.02678)
      PathPoint P9: hand (0.0266 -0.08633 -0.02903)
      PathWrap: wrap_object=FDS method=hybrid
      PathWrap: wrap_object=_2rdmcp_FDS method=hybrid range=(5 6)
      PathWrap: wrap_object=Secondpm_FDS method=hybrid range=(7 8)
    Millard2012EquilibriumMuscle FDPL: max_isometric_force=236.8 optimal_fiber_length=0.07817389
        tendon_slack_length=0.2942219 pennation_angle_at_optimal=0.1396263
      PathPoint P1: ulna (-0.00671286 -0.0343553 0.00271508)
      PathPoint P2: radius (0.0150612 -0.197923 0.00920346)
      PathPoint P3: hand (-0.00088 -0.01027 -0.01188)
      PathPoint P4: hand (-0.01855 -0.04646 -0.00733)
      PathPoint P5: hand (-0.01808 -0.05841 -0.0156)
      PathPoint P6: hand (-0.01428 -0.07289 -0.02683)
      PathPoint P7: hand (-0.0092 -0.07483 -0.03684)
      PathPoint P8: hand (-0.00312 -0.07405 -0.04165)
      PathPoint P9: hand (0.00446 -0.07059 -0.04657)
      PathWrap: wrap_object=FDP method=hybrid
      PathWrap: wrap_object=_5rdmcp_FDP method=hybrid range=(4 5)
      PathWrap: wrap_object=Fifthpm_FDP method=hybrid range=(6 7)
      PathWrap: wrap_object=Fifthmd_flex method=hybrid range=(8 9)
    Millard2012EquilibriumMuscle FDPR: max_isometric_force=172.9 optimal_fiber_length=0.08313473
        tendon_slack_length=0.3036814 pennation_angle_at_optimal=0.1221731
      PathPoint P1: ulna (-0.00536601 -0.0360656 0.00291817)
      PathPoint P2: radius (0.0168891 -0.19913 0.00858349)
      PathPoint P3: hand (0.00106 -0.01177 -0.01184)
      PathPoint P4: hand (-0.00855 -0.05542 0.00088)
      PathPoint P5: hand (-0.01079 -0.06588 -0.00817)
      PathPoint P6: hand (-0.00547 -0.08154 -0.02256)
      PathPoint P7: hand (-0.00056 -0.0823 -0.03367)
      PathPoint P8: hand (0.00609 -0.07837 -0.04238)
      PathPoint P9: hand (0.01211 -0.0738 -0.04858)
      PathWrap: wrap_object=FDP method=hybrid
      PathWrap: wrap_object=_4rdmcp_FDP method=hybrid range=(4 5)
      PathWrap: wrap_object=Fourthpm_FDP method=hybrid range=(6 7)
      PathWrap: wrap_object=Fourthmd_flex method=hybrid range=(8 9)
    Millard2012EquilibriumMuscle FDPM: max_isometric_force=212.4 optimal_fiber_length=0.08692915
        tendon_slack_length=0.3154435 pennation_angle_at_optimal=0.1047198
      PathPoint P1: ulna (-0.0055798 -0.0355632 0.00224475)
      PathPoint P2: radius (0.0203738 -0.199291 0.00839108)
      PathPoint P3: hand (0.00335 -0.0128 -0.01144)
      PathPoint P4: hand (0.00302 -0.03447 -0.00611)
      PathPoint P5: hand (0.00252 -0.05863 0.00122)
      PathPoint P6: hand (0.00285 -0.06985 -0.00133)
      PathPoint P7: hand (0.00863 -0.08779 -0.01815)
      PathPoint P8: hand (0.01002 -0.08766 -0.02964)
      PathPoint P9: hand (0.01633 -0.08157 -0.04435)
      PathPoint P10: hand (0.01909 -0.07663 -0.05229)
      PathWrap: wrap_object=FDP method=hybrid
      PathWrap: wrap_object=_3rdmcp_FDP method=hybrid range=(5 6)
      PathWrap: wrap_object=Thirdpm_FDP method=hybrid range=(7 8)
      PathWrap: wrap_object=Thirdmd_flex method=hybrid range=(9 10)
    Millard2012EquilibriumMuscle FDPI: max_isometric_force=197.3 optimal_fiber_length=0.07800761
        tendon_slack_length=0.3140093 pennation_angle_at_optimal=0.1221731
      PathPoint P1: ulna (-0.00691596 -0.0339491 0.002993)
      PathPoint P2: radius (0.0222337 -0.198393 0.00978068)
      PathPoint P3: hand (0.00896 -0.01168 -0.01212)
      PathPoint P4: hand (0.01922 -0.05542 0.00438)
      PathPoint P5: hand (0.02073 -0.07021 -0.00286)
      PathPoint P6: hand (0.02904 -0.08588 -0.01782)
      PathPoint P7: hand (0.02924 -0.08672 -0.02769)
      PathPoint P8: hand (0.02914 -0.08235 -0.03979)
      PathPoint P9: hand (0.02847 -0.07771 -0.04766)
      PathWrap: wrap_object=FDP method=hybrid
      PathWrap: wrap_object=_2rdmcp_FDP method=hybrid range=(4 5)
      PathWrap: wrap_object=Secondpm_FDP method=hybrid range=(6 7)
      PathWrap: wrap_object=Secondmd_flex method=hybrid range=(8 9)
    Millard2012EquilibriumMuscle EDCL: max_isometric_force=39.4 optimal_fiber_length=0.06777405
        tendon_slack_length=0.3492971 pennation_angle_at_optimal=0.03490659
      PathPoint P1: humerus (-0.000392078 -0.2826 0.0183297)
      MovingPathPoint P2: radius (0.00318215 -0.0419509 0.0147453) x_coordinate=pro_sup y_coordinate=pro_sup
          z_coordinate=pro_sup
        x_location: MultiplierFunction: scale=1.068927
          SimmSpline: x=(-1.5708 0 1.5708) y=(0.0121 0.0013 -0.0095)
        y_location: MultiplierFunction: scale=1.068927
          SimmSpline: x=(-1.5708 0 1.5708) y=(-0.04018 -0.03888 -0.03508)
        z_location: MultiplierFunction: scale=1.068927
          SimmSpline: x=(-1.5708 0 1.5708) y=(0.01055 0.01405 0.01316)
      PathPoint P3: radius (0.0106144 -0.238414 0.0386738)
      PathPoint P4: hand (-0.02464 -0.04402 0.00169)
      PathPoint P5: hand (-0.02381 -0.04734 0.00077)
      PathPoint P6: hand (-0.02395 -0.06613 -0.01001)
      PathPoint P7: hand (-0.01798 -0.07847 -0.02711)
      PathPoint P8: hand (-0.01178 -0.07877 -0.03779)
      PathPoint P9: hand (-0.0015 -0.07586 -0.04586)
      PathPoint P10: hand (0.00201 -0.07487 -0.04794)
      PathWrap: wrap_object=EDCL method=hybrid range=(3 4)
      PathWrap: wrap_object=_5rdmcp_ext method=hybrid range=(5 6)
      PathWrap: wrap_object=Fifthpm_ext method=hybrid range=(7 8)
      PathWrap: wrap_object=Fifthmd_ext method=hybrid range=(9 10)
    Millard2012EquilibriumMuscle EDCR: max_isometric_force=109.2 optimal_fiber_length=0.06523332
        tendon_slack_length=0.380354 pennation_angle_at_optimal=0.05235988
      PathPoint P1: humerus (-0.00152911 -0.28363 0.0174671)
      MovingPathPoint P2: radius (0.00457176 -0.0430519 0.0163166) x_coordinate=pro_sup y_coordinate=pro_sup
          z_coordinate=pro_sup
        x_location: MultiplierFunction: scale=1.068927
          SimmSpline: x=(-1.5708 0 1.5708) y=(0.0134 0.0026 -0.0082)
        y_location: MultiplierFunction: scale=1.068927
          SimmSpline: x=(-1.5708 0 1.5708) y=(-0.04121 -0.03991 -0.03611)
        z_location: MultiplierFunction: scale=1.068927
          SimmSpline: x=(-1.5708 0 1.5708) y=(0.01202 0.01552 0.01463)
      PathPoint P3: radius (0.00942794 -0.239076 0.0457928)
      PathPoint P4: hand (-0.01564 -0.0555 0.00934)
      PathPoint P5: hand (-0.01427 -0.05819 0.01161)
      PathPoint P6: hand (-0.0158 -0.07216 -0.00421)
      PathPoint P7: hand (-0.00825 -0.08735 -0.0226)
      PathPoint P8: hand (-0.00272 -0.08806 -0.03409)
      PathPoint P9: hand (0.00763 -0.08026 -0.04658)
      PathPoint P10: hand (0.01069 -0.07809 -0.04941)
      PathWrap: wrap_object=EDCR method=hybrid
      PathWrap: wrap_object=_4rdmcp_ext method=hybrid range=(5 6)
      PathWrap: wrap_object=Fourthpm_ext method=hybrid range=(7 8)
      PathWrap: wrap_object=Fourthmd_ext method=hybrid range=(9 10)
    Millard2012EquilibriumMuscle EDCM: max_isometric_force=94.4 optimal_fiber_length=0.07534808
        tendon_slack_length=0.3798626 pennation_angle_at_optimal=0.05235988
      PathPoint P1: humerus (0.0004999 -0.2841 0.019104)
      MovingPathPoint P2: radius (0.00517036 -0.0425923 0.01606) x_coordinate=pro_sup y_coordinate=pro_sup
          z_coordinate=pro_sup
        x_location: MultiplierFunction: scale=1.068927
          SimmSpline: x=(-1.5708 0 1.5708) y=(0.01396 0.00316 -0.00764)
        y_location: MultiplierFunction: scale=1.068927
          SimmSpline: x=(-1.5708 0 1.5708) y=(-0.04078 -0.03948 -0.03568)
        z_location: MultiplierFunction: scale=1.068927
          SimmSpline: x=(-1.5708 0 1.5708) y=(0.01178 0.01528 0.01439)
      PathPoint P3: radius (0.0153926 -0.238617 0.0451408)
      PathPoint P4: hand (0.00039 -0.05274 0.01491)
      PathPoint P5: hand (-0.00087 -0.05574 0.01452)
      PathPoint P6: hand (0.00186 -0.07718 0.00597)
      PathPoint P7: hand (0.01007 -0.09313 -0.01774)
      PathPoint P8: hand (0.01321 -0.09558 -0.03056)
      PathPoint P9: hand (0.01857 -0.08525 -0.04759)
      PathPoint P10: hand (0.02056 -0.07993 -0.05341)
      PathPoint P11: hand (0.02195 -0.07701 -0.05663)
      PathWrap: wrap_object=EDCM method=hybrid range=(1 4)
      PathWrap: wrap_object=Thirdmd_ext method=hybrid range=(9 10)
      PathWrap: wrap_object=Thirdpm_ext method=hybrid range=(7 8)
      PathWrap: wrap_object=_3rdmcp_ext method=hybrid range=(5 6)
    Millard2012EquilibriumMuscle EDCI: max_isometric_force=48.8 optimal_fiber_length=0.07288012
        tendon_slack_length=0.3800178 pennation_angle_at_optimal=0.05235988
      PathPoint P1: humerus (0.000637127 -0.283257 0.0183199)
      MovingPathPoint P2: radius (0.0042297 -0.0422716 0.015579) x_coordinate=pro_sup y_coordinate=pro_sup
          z_coordinate=pro_sup
        x_location: MultiplierFunction: scale=1.068927
          SimmSpline: x=(-1.5708 0 1.5708) y=(0.01308 0.00228 -0.00852)
        y_location: MultiplierFunction: scale=1.068927
          SimmSpline: x=(-1.5708 0 1.5708) y=(-0.04048 -0.03918 -0.03538)
        z_location: MultiplierFunction: scale=1.068927
          SimmSpline: x=(-1.5708 0 1.5708) y=(0.01133 0.01483 0.01394)
      PathPoint P3: radius (0.0163867 -0.23852 0.0448522)
      PathPoint P4: hand (0.01543 -0.0468 0.01639)
      PathPoint P5: hand (0.01897 -0.05654 0.01438)
      PathPoint P6: hand (0.01994 -0.07678 0.00594)
      PathPoint P7: hand (0.02945 -0.09162 -0.01245)
      PathPoint P8: hand (0.03121 -0.09349 -0.02905)
      PathPoint P9: hand (0.03013 -0.08487 -0.04268)
      PathPoint P10: hand (0.02929 -0.08103 -0.04966)
      PathWrap: wrap_object=EDCI method=hybrid range=(3 4)
      PathWrap: wrap_object=_2rdmcp_ext method=hybrid range=(5 6)
      PathWrap: wrap_object=Secondpm_ext method=hybrid range=(7 8)
      PathWrap: wrap_object=Secondmd_ext method=hybrid range=(9 10)
    Millard2012EquilibriumMuscle EDM: max_isometric_force=72.4 optimal_fiber_length=0.07042162
        tendon_slack_length=0.3494999 pennation_angle_at_optimal=0.05235988
      PathPoint P1: humerus (0.000872375 -0.283463 0.0181042)
      PathPoint P2: ulna (-0.0104434 -0.041763 0.0329764)
      PathPoint P3: ulna (-0.0080704 -0.0883682 0.0389731)
      PathPoint P4: radius (0.00485293 -0.242016 0.0393151)
      PathPoint P5: hand (-0.02059 -0.01032 0.00372)
      PathPoint P6: hand (-0.02563 -0.04722 0.00023)
      PathPoint P7: hand (-0.02549 -0.06511 -0.01098)
      PathPoint P8: hand (-0.01933 -0.0781 -0.02718)
      PathPoint P9: hand (-0.01346 -0.07892 -0.03894)
      PathPoint P10: hand (-0.00216 -0.07521 -0.04589)
      PathPoint P11: hand (0.00132 -0.07345 -0.04803)
      PathWrap: wrap_object=EDM method=hybrid range=(4 5)
      PathWrap: wrap_object=Fifthmd_ext method=hybrid range=(10 11)
      PathWrap: wrap_object=Fifthpm_ext method=hybrid range=(8 9)
      PathWrap: wrap_object=_5rdmcp_ext method=hybrid range=(6 7)
    Millard2012EquilibriumMuscle EIP: max_isometric_force=47.3 optimal_fiber_length=0.06023666
        tendon_slack_length=0.2147657 pennation_angle_at_optimal=0.1047198
      PathPoint P1: ulna (-0.00421157 -0.177998 0.0393579)
      PathPoint P2: ulna (0.00182787 -0.186731 0.0432809)
      PathPoint P3: radius (0.0115017 -0.243534 0.0391655)
      PathPoint P4: hand (0.00388 -0.02234 0.01184)
      PathPoint P5: hand (0.01693 -0.0564 0.01377)
      PathPoint P6: hand (0.01735 -0.07692 0.00581)
      PathPoint P7: hand (0.02765 -0.09314 -0.01511)
      PathPoint P8: hand (0.02879 -0.09437 -0.02823)
      PathPoint P9: hand (0.0287 -0.08524 -0.04295)
      PathPoint P10: hand (0.02834 -0.07785 -0.05501)
      PathWrap: wrap_object=Extensor_ellipse method=hybrid
      PathWrap: wrap_object=_2rdmcp_ext method=hybrid range=(5 6)
      PathWrap: wrap_object=Secondpm_ext method=hybrid range=(7 8)
      PathWrap: wrap_object=Secondmd_ext method=hybrid range=(9 10)
    Millard2012EquilibriumMuscle EPL: max_isometric_force=88.3 optimal_fiber_length=0.05625164
        tendon_slack_length=0.2401112 pennation_angle_at_optimal=0.1047198
      PathPoint P1: ulna (-0.0150933 -0.10375 0.0315547)
      PathPoint P2: radius (0.00132547 -0.146101 0.0242646)
      PathPoint P3: radius (0.0288824 -0.233796 0.0409185)
      PathPoint P4: radius (0.0361511 -0.243224 0.0492455)
      PathPoint P5: radius (0.0452584 -0.254095 0.0446063)
      PathPoint P6: hand (0.02428 0.00014 0.00608)
      PathPoint P7: hand (0.02338 -0.00917 -0.00039)
      PathPoint P8: hand (0.02905 -0.01427 -0.00489)
      PathPoint P9: hand (0.04414 -0.03417 -0.01814)
      PathPoint P10: hand (0.04867 -0.04646 -0.02487)
      PathPoint P11: hand (0.04751 -0.0701 -0.03774)
      PathPoint P12: hand (0.04011 -0.07565 -0.04283)
      PathWrap: wrap_object=MPthumb method=hybrid
    Millard2012EquilibriumMuscle EPB: max_isometric_force=46 optimal_fiber_length=0.0702004
        tendon_slack_length=0.1201207 pennation_angle_at_optimal=0.122173
      PathPoint P1: radius (0.0205662 -0.157079 0.0225971)
      PathPoint P2: radius (0.0243288 -0.1695 0.0284869)
      PathPoint P3: radius (0.0409506 -0.210814 0.0409827)
      PathPoint P4: radius (0.0559583 -0.252384 0.0288503)
      PathPoint P5: hand (0.03123 0.00256 -0.00327)
      PathPoint P6: hand (0.02972 -0.00794 -0.01436)
      PathPoint P7: hand (0.04422 -0.033 -0.02422)
      PathPoint P8: hand (0.04528 -0.04785 -0.03186)
      PathWrap: wrap_object=MPthumb method=hybrid
    Millard2012EquilibriumMuscle FPL: max_isometric_force=201 optimal_fiber_length=0.0573798
        tendon_slack_length=0.2047793 pennation_angle_at_optimal=0.1221731
      PathPoint P1: radius (0.0103793 -0.101099 0.0189093)
      PathPoint P2: radius (0.0177228 -0.144572 0.02047)
      PathPoint P3: radius (0.0199783 -0.19168 0.0212503)
      PathPoint P4: radius (0.0406192 -0.247681 0.0168891)
      MovingPathPoint P5: hand (0.0187168 0.00890026 -0.0154249) x_coordinate=flexion y_coordinate=flexion
          z_coordinate=flexion
        x_location: MultiplierFunction: scale=1
          SimmSpline: x=(-1.22173 0 1.22173) y=(0.01869 0.01869 0.01549)
        y_location: MultiplierFunction: scale=1
          SimmSpline: x=(-1.22173 0 1.22173) y=(0.00882 0.00882 -0.00078)
        z_location: MultiplierFunction: scale=1
          SimmSpline: x=(-1.22173 0 1.22173) y=(-0.01547 -0.01547 -0.02087)
      PathPoint P6: hand (0.01244 -0.02207 -0.02089)
      PathPoint P7: hand (0.01641 -0.02621 -0.02221)
      PathPoint P8: hand (0.02457 -0.03294 -0.02237)
      PathPoint P9: hand (0.02827 -0.05482 -0.03055)
      PathPoint P10: hand (0.03511 -0.06519 -0.03749)
      PathPoint P11: hand (0.03533 -0.07656 -0.04118)
      PathWrap: wrap_object=FPL method=hybrid
      PathWrap: wrap_object=IPthumb method=hybrid range=(10 11)
      PathWrap: wrap_object=MPthumb method=hybrid
    Millard2012EquilibriumMuscle APL: max_isometric_force=116.7 optimal_fiber_length=0.07522177
        tendon_slack_length=0.136623 pennation_angle_at_optimal=0.1396263
      PathPoint P1: radius (0.0123354 -0.101302 0.0179687)
      PathPoint P2: radius (0.0323885 -0.149329 0.0374873)
      PathPoint P3: radius (0.0426823 -0.171798 0.0363435)
      PathPoint P4: radius (0.0470007 -0.19075 0.0335002)
      PathPoint P5: radius (0.0588444 -0.246751 0.0253122)
      MovingPathPoint P6: hand (0.0338709 0.00634836 -0.0074082) x_coordinate=flexion y_coordinate=flexion
          z_coordinate=flexion
        x_location: MultiplierFunction: scale=1
          SimmSpline: x=(-1.22173 0 1.22173) y=(0.03385 0.03385 0.03135)
        y_location: MultiplierFunction: scale=1
          SimmSpline: x=(-1.22173 0 1.22173) y=(0.00634 0.00634 0.00534)
        z_location: MultiplierFunction: scale=1
          SimmSpline: x=(-1.22173 0 1.22173) y=(-0.00745 -0.00745 -0.01245)
      PathPoint P7: hand (0.02587 0.00205 -0.0165)
      PathPoint P8: hand (0.02878 -0.00674 -0.0187)
      PathPoint P9: hand (0.03076 -0.01583 -0.01885)
  MarkerSet:
    Marker R.Clavicle: clavicle (0.0391002 -0.021421 0.00998485)
    Marker C7: thorax (-0.0783922 0.0746961 -0.0250191)
    Marker R.Shoulder: scapula (-0.00506902 -0.00540542 0.0158641)
    Marker R.Bicep: humerus (0.0371888 -0.168894 0.0031714)
    Marker R.Elbow.Lateral: humerus (0.00280159 -0.282653 0.0309919)
    Marker R.Forearm: radius (0.0444117 -0.0885734 0.0173566)
    Marker R.Radius: radius (0.0528555 -0.245426 0.0258057)
    Marker Handle: hand (0.0619722 -0.0948215 0.0109191)
    Marker R.Elbow.Medial: humerus (-0.00134883 -0.288508 -0.0574697)
    Marker R.Ulna: ulna (-0.0245828 -0.2642 0.0481514)
