# OpenSim document version 30000
MeasurementSet generic:
  Measurement torso_y: apply=true
    MarkerPair: markers=(racr rasi)
    MarkerPair: markers=(lacr lasi)
    MarkerPair: markers=(c7 s2)
    BodyScale head_neck: axes=Y
    BodyScale scapula_R: axes=Y
    BodyScale clavicle_R: axes=Y
    BodyScale Abd_R_L1: axes=Y
    BodyScale Abd_R_L2: axes=Y
    BodyScale Abd_R_L3: axes=Y
    BodyScale Abd_R_L4: axes=Y
    BodyScale Abd_R_L5: axes=Y
    BodyScale rib1_R: axes=Y
    BodyScale rib2_R: axes=Y
    BodyScale rib3_R: axes=Y
    BodyScale rib4_R: axes=Y
    BodyScale rib5_R: axes=Y
    BodyScale rib6_R: axes=Y
    BodyScale rib7_R: axes=Y
    BodyScale rib8_R: axes=Y
    BodyScale rib9_R: axes=Y
    BodyScale rib10_R: axes=Y
    BodyScale rib11_R: axes=Y
    BodyScale rib12_R: axes=Y
  Measurement torso_x: apply=true
    MarkerPair: markers=(c7 jug)
    MarkerPair: markers=(rpsi rasi)
    MarkerPair: markers=(lpsi lasi)
    BodyScale torso: axes=X
  Measurement torso_z: apply=true
    MarkerPair: markers=(racr lacr)
    MarkerPair: markers=(rasi lasi)
    BodyScale torso: axes=Z
  Measurement pelvis_x: apply=true
    MarkerPair: markers=(rpsi rasi)
    MarkerPair: markers=(lpsi lasi)
    BodyScale pelvis: axes=X
  Measurement pelvis_yz: apply=true
    MarkerPair: markers=(rasi lasi)
    MarkerPair: markers=(rasi rlfc)
    MarkerPair: markers=(lasi llfc)
    BodyScale pelvis: axes=(Y Z)
  Measurement thigh_r_y: apply=true
    MarkerPair: markers=(rasi rlfc)
    BodyScale femur_r: axes=Y
    BodyScale patella_r: axes=Y
  Measurement thigh_r_xz: apply=true
    MarkerPair: markers=(rlfc rmfc)
    BodyScale femur_r: axes=(X Z)
    BodyScale patella_r: axes=(X Z)
  Measurement shank_r_y: apply=true
    MarkerPair: markers=(rlfc rlmal)
    BodyScale tibia_r: axes=Y
    BodyScale talus_r: axes=Y
  Measurement shank_r_xz: apply=true
    MarkerPair: markers=(rlmal rmmal)
    BodyScale tibia_r: axes=(X Z)
    BodyScale talus_r: axes=(X Z)
  Measurement foot_r_xy: apply=true
    MarkerPair: markers=(rcal rtoe)
    BodyScale calcn_r: axes=(X Y)
    BodyScale toes_r: axes=(X Y)
  Measurement foot_r_z: apply=true
    MarkerPair: markers=(rmt1 rmt5)
    BodyScale calcn_r: axes=Z
    BodyScale toes_r: axes=Z
  Measurement upper arm_r: apply=true
    MarkerPair: markers=(racr rlel)
    BodyScale humerus_r: axes=(X Y Z)
  Measurement forearm_hand_r: apply=true
    MarkerPair: markers=(rlel rdr)
    BodyScale ulna_r: axes=(X Y Z)
    BodyScale radius_r: axes=(X Y Z)
    BodyScale hand_r: axes=(X Y Z)
  Measurement thigh_l_y: apply=true
    MarkerPair: markers=(lasi llfc)
    BodyScale femur_l: axes=Y
    BodyScale patella_l: axes=Y
  Measurement thigh_l_xz: apply=true
    MarkerPair: markers=(llfc lmfc)
    BodyScale femur_l: axes=(X Z)
    BodyScale patella_l: axes=(X Z)
  Measurement shank_l_y: apply=true
    MarkerPair: markers=(llfc llmal)
    BodyScale tibia_l: axes=Y
    BodyScale talus_l: axes=Y
  Measurement shank_l_xz: apply=true
    MarkerPair: markers=(llmal lmmal)
    BodyScale tibia_l: axes=(X Z)
    BodyScale talus_l: axes=(X Z)
  Measurement foot_l_xy: apply=true
    MarkerPair: markers=(lcal ltoe)
    BodyScale calcn_l: axes=(X Y)
    BodyScale toes_l: axes=(X Y)
  Measurement foot_l_z: apply=true
    MarkerPair: markers=(lmt1 lmt5)
    BodyScale calcn_l: axes=Z
    BodyScale toes_l: axes=Z
  Measurement upper arm_l: apply=true
    MarkerPair: markers=(lacr llel)
    BodyScale humerus_l: axes=(X Y Z)
  Measurement forearm_hand_l: apply=true
    MarkerPair: markers=(llel ldr)
    BodyScale ulna_l: axes=(X Y Z)
    BodyScale radius_l: axes=(X Y Z)
    BodyScale hand_l: axes=(X Y Z)
