# OpenSim document version 40000
ScaleTool generic:
  mass: 79.58
  height: 1.8
  GenericModelMaker generic:
    model_file: /Users/rosswilkinson/Google Drive/projects/moco-cycling-standing/model/cyclistFullBodyMuscle.osim
    marker_set_file: /Users/rosswilkinson/Google Drive/projects/moco-cycling-standing/model/markerSet.xml
  ModelScaler generic:
    scaling_order: measurements
    time_range: [0 2]
    preserve_mass_distribution: true
    MeasurementSet: file=(/Users/rosswilkinson/Google Drive/projects/moco-cycling-standing/model/measurementSet.xml)
  MarkerPlacer generic:
    time_range: [0 2]
    max_marker_movement: -1
    IKTaskSet: file=(/Users/rosswilkinson/Google Drive/projects/moco-cycling-standing/model/tasksScale.xml)
