# OpenSim document version 30000
IKTaskSet generic:
  IKMarkerTask racr: apply=true weight=100
  IKMarkerTask lacr: apply=true weight=100
  IKMarkerTask c7: apply=true weight=100
  IKMarkerTask jug: apply=true weight=100
  IKMarkerTask rua: apply=true weight=10
  IKMarkerTask rlel: apply=true weight=100
  IKMarkerTask rfa: apply=true weight=10
  IKMarkerTask rdr: apply=true weight=100
  IKMarkerTask lua: apply=true weight=10
  IKMarkerTask llel: apply=true weight=100
  IKMarkerTask lfa: apply=true weight=10
  IKMarkerTask ldr: apply=true weight=100
  IKMarkerTask s2: apply=true weight=100
  IKMarkerTask ric: apply=true weight=1
  IKMarkerTask lic: apply=true weight=1
  IKMarkerTask rasi: apply=true weight=100
  IKMarkerTask lasi: apply=true weight=100
  IKMarkerTask rpsi: apply=true weight=100
  IKMarkerTask lpsi: apply=true weight=100
  IKMarkerTask rth1: apply=true weight=10
  IKMarkerTask rth2: apply=true weight=10
  IKMarkerTask rth3: apply=true weight=10
  IKMarkerTask rth4: apply=true weight=10
  IKMarkerTask rlfc: apply=true weight=100
  IKMarkerTask rsh1: apply=true weight=10
  IKMarkerTask rsh2: apply=true weight=10
  IKMarkerTask rsh3: apply=true weight=10
  IKMarkerTask rsh4: apply=true weight=10
  IKMarkerTask rlmal: apply=true weight=100
  IKMarkerTask rcal: apply=true weight=10
  IKMarkerTask rtoe: apply=true weight=10
  IKMarkerTask rmt5: apply=true weight=10
  IKMarkerTask lth1: apply=true weight=10
  IKMarkerTask lth2: apply=true weight=10
  IKMarkerTask lth3: apply=true weight=10
  IKMarkerTask lth4: apply=true weight=10
  IKMarkerTask llfc: apply=true weight=100
  IKMarkerTask lsh1: apply=true weight=10
  IKMarkerTask lsh2: apply=true weight=10
  IKMarkerTask lsh3: apply=true weight=10
  IKMarkerTask lsh4: apply=true weight=10
  IKMarkerTask llmal: apply=true weight=100
  IKMarkerTask lcal: apply=true weight=10
  IKMarkerTask ltoe: apply=true weight=10
  IKMarkerTask lmt5: apply=true weight=10
