# OpenSim document version 40000
Model cyclistFullBodyMuscleActuated:
  Ground
  BodySet:
    Body head: mass=8 [kg] mass_center=(0 0 0) inertia=(1 1 1 0 0 0)
        meshes=(skull.vtp jaw.vtp cerv1.vtp cerv2.vtp cerv3.vtp cerv4.vtp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)
    Body T1: mass=1.28 mass_center=(0 0 0) inertia=(1 1 1 0 0 0) meshes=thoracic1.vtp
    Body T2: mass=1.28 mass_center=(0 0 0) inertia=(1 1 1 0 0 0) meshes=thoracic2.vtp
    Body T3: mass=1.28 mass_center=(0 0 0) inertia=(1 1 1 0 0 0) meshes=thoracic3.vtp
    Body T4: mass=1.28 mass_center=(0 0 0) inertia=(1 1 1 0 0 0) meshes=thoracic4.vtp
    Body T5: mass=1.28 mass_center=(0 0 0) inertia=(1 1 1 0 0 0) meshes=thoracic5.vtp
    Body T6: mass=1.28 mass_center=(0 0 0) inertia=(1 1 1 0 0 0) meshes=thoracic6.vtp
    Body T7: mass=1.28 mass_center=(0 0 0) inertia=(1 1 1 0 0 0) meshes=thoracic7.vtp
    Body T8: mass=1.28 mass_center=(0 0 0) inertia=(1 1 1 0 0 0) meshes=thoracic8.vtp
    Body T9: mass=1.28 mass_center=(0 0 0) inertia=(1 1 1 0 0 0) meshes=thoracic9.vtp
    Body T10: mass=1.28 mass_center=(0 0 0) inertia=(1 1 1 0 0 0) meshes=thoracic10.vtp
    Body T11: mass=1.28 mass_center=(0 0 0) inertia=(1 1 1 0 0 0) meshes=thoracic11.vtp
    Body T12: mass=1.28 mass_center=(0 0 0) inertia=(1 1 1 0 0 0) meshes=thoracic12.vtp
    Body L1: mass=0.96 mass_center=(0 0 0) inertia=(1 1 1 0 0 0) meshes=lumbar1.vtp
    Body L2: mass=0.96 mass_center=(0 0 0) inertia=(1 1 1 0 0 0) meshes=lumbar2.vtp
    Body L3: mass=0.96 mass_center=(0 0 0) inertia=(1 1 1 0 0 0) meshes=lumbar3.vtp
    Body L4: mass=0.96 mass_center=(0 0 0) inertia=(1 1 1 0 0 0) meshes=lumbar4.vtp
    Body L5: mass=0.96 mass_center=(0 0 0) inertia=(1 1 1 0 0 0) meshes=lumbar5.vtp
    Body pelvis: mass=6.4 mass_center=(0 0 0) inertia=(1 1 1 0 0 0) meshes=(r_pelvis.vtp l_pelvis.vtp sacrum.vtp)
    Body R1R: mass=0.008 mass_center=(0 0 0) inertia=(1 1 1 0 0 0) meshes=Rib1R.vtp
    Body R2R: mass=0.008 mass_center=(0 0 0) inertia=(1 1 1 0 0 0) meshes=Rib2R.vtp
    Body R3R: mass=0.008 mass_center=(0 0 0) inertia=(1 1 1 0 0 0) meshes=Rib3R.vtp
    Body R4R: mass=0.008 mass_center=(0 0 0) inertia=(1 1 1 0 0 0) meshes=Rib4R.vtp
    Body R5R: mass=0.008 mass_center=(0 0 0) inertia=(1 1 1 0 0 0) meshes=Rib5R.vtp
    Body R6R: mass=0.008 mass_center=(0 0 0) inertia=(1 1 1 0 0 0) meshes=Rib6R.vtp
    Body R7R: mass=0.008 mass_center=(0 0 0) inertia=(1 1 1 0 0 0) meshes=Rib7R.vtp
    Body R8R: mass=0.008 mass_center=(0 0 0) inertia=(1 1 1 0 0 0) meshes=Rib8R.vtp
    Body R9R: mass=0.008 mass_center=(0 0 0) inertia=(1 1 1 0 0 0) meshes=Rib9R.vtp
    Body R10R: mass=0.008 mass_center=(0 0 0) inertia=(1 1 1 0 0 0) meshes=Rib10R.vtp
    Body R11R: mass=0.008 mass_center=(0 0 0) inertia=(1 1 1 0 0 0) meshes=Rib11R.vtp
    Body R12R: mass=0.008 mass_center=(0 0 0) inertia=(1 1 1 0 0 0) meshes=Rib12R.vtp
    Body R1L: mass=0.008 mass_center=(0 0 0) inertia=(1 1 1 0 0 0) meshes=Rib1L.vtp
    Body R2L: mass=0.008 mass_center=(0 0 0) inertia=(1 1 1 0 0 0) meshes=Rib2L.vtp
    Body R3L: mass=0.008 mass_center=(0 0 0) inertia=(1 1 1 0 0 0) meshes=Rib3L.vtp
    Body R4L: mass=0.008 mass_center=(0 0 0) inertia=(1 1 1 0 0 0) meshes=Rib4L.vtp
    Body R5L: mass=0.008 mass_center=(0 0 0) inertia=(1 1 1 0 0 0) meshes=Rib5L.vtp
    Body R6L: mass=0.008 mass_center=(0 0 0) inertia=(1 1 1 0 0 0) meshes=Rib6L.vtp
    Body R7L: mass=0.008 mass_center=(0 0 0) inertia=(1 1 1 0 0 0) meshes=Rib7L.vtp
    Body R8L: mass=0.008 mass_center=(0 0 0) inertia=(1 1 1 0 0 0) meshes=Rib8L.vtp
    Body R9L: mass=0.008 mass_center=(0 0 0) inertia=(1 1 1 0 0 0) meshes=Rib9L.vtp
    Body R10L: mass=0.008 mass_center=(0 0 0) inertia=(1 1 1 0 0 0) meshes=Rib10L.vtp
    Body R11L: mass=0.008 mass_center=(0 0 0) inertia=(1 1 1 0 0 0) meshes=Rib11L.vtp
    Body R12L: mass=0.008 mass_center=(0 0 0) inertia=(1 1 1 0 0 0) meshes=Rib12L.vtp
    Body abdomen: mass=0.008 mass_center=(0 0 0) inertia=(1 1 1 0 0 0)
    Body sternum: mass=0.008 mass_center=(0 0 0) inertia=(1 1 1 0 0 0) meshes=sternum.vtp
    Body clavicleRight: mass=0.008 mass_center=(0 0 0) inertia=(1 1 1 0 0 0) meshes=r_clavicle.vtp
    Body scapulaRight: mass=0.008 mass_center=(0 0 0) inertia=(1 1 1 0 0 0) meshes=r_scapula.vtp
    Body upperArmRight: mass=4 mass_center=(0 0 0) inertia=(1 1 1 0 0 0) meshes=r_humerus.vtp
    Body forearmRight: mass=2.4 mass_center=(0 0 0) inertia=(1 1 1 0 0 0) meshes=(r_ulna.vtp r_radius.vtp)
    Body handRight: mass=0.8 mass_center=(0 0 0) inertia=(1 1 1 0 0 0) meshes=r_hand.vtp
    Body clavicleLeft: mass=0.008 mass_center=(0 0 0) inertia=(1 1 1 0 0 0) meshes=l_clavicle.vtp
    Body scapulaLeft: mass=0.008 mass_center=(0 0 0) inertia=(1 1 1 0 0 0) meshes=l_scapula.vtp
    Body upperArmLeft: mass=4 mass_center=(0 0 0) inertia=(1 1 1 0 0 0) meshes=l_humerus.vtp
    Body forearmLeft: mass=2.4 mass_center=(0 0 0) inertia=(1 1 1 0 0 0) meshes=(l_ulna.vtp l_radius.vtp)
    Body handLeft: mass=0.8 mass_center=(0 0 0) inertia=(1 1 1 0 0 0) meshes=l_hand.vtp
    Body thighRight: mass=8 mass_center=(0 0 0) inertia=(1 1 1 0 0 0) meshes=r_femur.vtp
    Body shankRight: mass=8 mass_center=(0 0 0) inertia=(1 1 1 0 0 0) meshes=(r_tibia.vtp r_fibula.vtp)
    Body patellaRight: mass=0.008 mass_center=(0 0 0) inertia=(1 1 1 0 0 0) meshes=r_patella.vtp
    Body talusRight: mass=0.8 mass_center=(0 0 0) inertia=(1 1 1 0 0 0) meshes=r_talus.vtp
    Body calcaneusRight: mass=1.6 mass_center=(0 0 0) inertia=(1 1 1 0 0 0) meshes=r_foot.vtp
    Body toesRight: mass=0.8 mass_center=(0 0 0) inertia=(1 1 1 0 0 0) meshes=r_toes.vtp
    Body thighLeft: mass=8 mass_center=(0 0 0) inertia=(1 1 1 0 0 0) meshes=l_femur.vtp
    Body shankLeft: mass=8 mass_center=(0 0 0) inertia=(1 1 1 0 0 0) meshes=(l_tibia.vtp l_fibula.vtp)
    Body patellaLeft: mass=0.008 mass_center=(0 0 0) inertia=(1 1 1 0 0 0) meshes=l_patella.vtp
    Body talusLeft: mass=0.8 mass_center=(0 0 0) inertia=(1 1 1 0 0 0) meshes=l_talus.vtp
    Body calcaneusLeft: mass=1.6 mass_center=(0 0 0) inertia=(1 1 1 0 0 0) meshes=l_foot.vtp
    Body toesLeft: mass=0.8 mass_center=(0 0 0) inertia=(1 1 1 0 0 0) meshes=l_toes.vtp
  JointSet:
    FreeJoint groundToHead: socket_parent_frame=ground_offset socket_child_frame=head_offset
      Coordinate groundToHead_coord_0
      Coordinate groundToHead_coord_1
      Coordinate groundToHead_coord_2
      Coordinate groundToHead_coord_3
      Coordinate groundToHead_coord_4
      Coordinate groundToHead_coord_5
      PhysicalOffsetFrame ground_offset: socket_parent=/ground translation=(0 0 0) [meters]
      PhysicalOffsetFrame head_offset: socket_parent=/bodyset/head translation=(0 0 0)
    WeldJoint C7T1: socket_parent_frame=head_offset socket_child_frame=T1_offset
      PhysicalOffsetFrame head_offset: socket_parent=/bodyset/head translation=(-0.0216 -0.1179 0)
      PhysicalOffsetFrame T1_offset: socket_parent=/bodyset/T1 translation=(-0.00684 0.020271 0)
          orientation=(0 0 0.5236) [radians]
    BallJoint T1T2: socket_parent_frame=T1_offset socket_child_frame=T2_offset
      Coordinate T1T2_coord_0
      Coordinate T1T2_coord_1
      Coordinate T1T2_coord_2
      PhysicalOffsetFrame T1_offset: socket_parent=/bodyset/T1 translation=(0 0 0)
      PhysicalOffsetFrame T2_offset: socket_parent=/bodyset/T2 translation=(0 0 0)
    BallJoint T2T3: socket_parent_frame=T2_offset socket_child_frame=T3_offset
      Coordinate T2T3_coord_0
      Coordinate T2T3_coord_1
      Coordinate T2T3_coord_2
      PhysicalOffsetFrame T2_offset: socket_parent=/bodyset/T2 translation=(0 0 0)
      PhysicalOffsetFrame T3_offset: socket_parent=/bodyset/T3 translation=(0 0 0)
    BallJoint T3T4: socket_parent_frame=T3_offset socket_child_frame=T4_offset
      Coordinate T3T4_coord_0
      Coordinate T3T4_coord_1
      Coordinate T3T4_coord_2
      PhysicalOffsetFrame T3_offset: socket_parent=/bodyset/T3 translation=(0 0 0)
      PhysicalOffsetFrame T4_offset: socket_parent=/bodyset/T4 translation=(0 0 0)
    BallJoint T4T5: socket_parent_frame=T4_offset socket_child_frame=T5_offset
      Coordinate T4T5_coord_0
      Coordinate T4T5_coord_1
      Coordinate T4T5_coord_2
      PhysicalOffsetFrame T4_offset: socket_parent=/bodyset/T4 translation=(0 0 0)
      PhysicalOffsetFrame T5_offset: socket_parent=/bodyset/T5 translation=(0 0 0)
    BallJoint T5T6: socket_parent_frame=T5_offset socket_child_frame=T6_offset
      Coordinate T5T6_coord_0
      Coordinate T5T6_coord_1
      Coordinate T5T6_coord_2
      PhysicalOffsetFrame T5_offset: socket_parent=/bodyset/T5 translation=(0 0 0)
      PhysicalOffsetFrame T6_offset: socket_parent=/bodyset/T6 translation=(0 0 0)
    BallJoint T6T7: socket_parent_frame=T6_offset socket_child_frame=T7_offset
      Coordinate T6T7_coord_0
      Coordinate T6T7_coord_1
      Coordinate T6T7_coord_2
      PhysicalOffsetFrame T6_offset: socket_parent=/bodyset/T6 translation=(0 0 0)
      PhysicalOffsetFrame T7_offset: socket_parent=/bodyset/T7 translation=(0 0 0)
    BallJoint T7T8: socket_parent_frame=T7_offset socket_child_frame=T8_offset
      Coordinate T7T8_coord_0
      Coordinate T7T8_coord_1
      Coordinate T7T8_coord_2
      PhysicalOffsetFrame T7_offset: socket_parent=/bodyset/T7 translation=(0 0 0)
      PhysicalOffsetFrame T8_offset: socket_parent=/bodyset/T8 translation=(0 0 0)
    BallJoint T8T9: socket_parent_frame=T8_offset socket_child_frame=T9_offset
      Coordinate T8T9_coord_0
      Coordinate T8T9_coord_1
      Coordinate T8T9_coord_2
      PhysicalOffsetFrame T8_offset: socket_parent=/bodyset/T8 translation=(0 0 0)
      PhysicalOffsetFrame T9_offset: socket_parent=/bodyset/T9 translation=(0 0 0)
    BallJoint T9T10: socket_parent_frame=T9_offset socket_child_frame=T10_offset
      Coordinate T9T10_coord_0
      Coordinate T9T10_coord_1
      Coordinate T9T10_coord_2
      PhysicalOffsetFrame T9_offset: socket_parent=/bodyset/T9 translation=(0 0 0)
      PhysicalOffsetFrame T10_offset: socket_parent=/bodyset/T10 translation=(0 0 0)
    BallJoint T10T11: socket_parent_frame=T10_offset socket_child_frame=T11_offset
      Coordinate T10T11_coord_0
      Coordinate T10T11_coord_1
      Coordinate T10T11_coord_2
      PhysicalOffsetFrame T10_offset: socket_parent=/bodyset/T10 translation=(0 0 0)
      PhysicalOffsetFrame T11_offset: socket_parent=/bodyset/T11 translation=(0 0 0)
    BallJoint T11T12: socket_parent_frame=T11_offset socket_child_frame=T12_offset
      Coordinate T11T12_coord_0
      Coordinate T11T12_coord_1
      Coordinate T11T12_coord_2
      PhysicalOffsetFrame T11_offset: socket_parent=/bodyset/T11 translation=(0 0 0)
      PhysicalOffsetFrame T12_offset: socket_parent=/bodyset/T12 translation=(0 0 0)
    BallJoint T12L1: socket_parent_frame=T12_offset socket_child_frame=L1_offset
      Coordinate T12L1_coord_0
      Coordinate T12L1_coord_1
      Coordinate T12L1_coord_2
      PhysicalOffsetFrame T12_offset: socket_parent=/bodyset/T12 translation=(0 0 0)
      PhysicalOffsetFrame L1_offset: socket_parent=/bodyset/L1 translation=(0 0 0)
    BallJoint L1L2: socket_parent_frame=L1_offset socket_child_frame=L2_offset
      Coordinate L1L2_coord_0
      Coordinate L1L2_coord_1
      Coordinate L1L2_coord_2
      PhysicalOffsetFrame L1_offset: socket_parent=/bodyset/L1 translation=(0 0 0)
      PhysicalOffsetFrame L2_offset: socket_parent=/bodyset/L2 translation=(0 0 0)
    BallJoint L2L3: socket_parent_frame=L2_offset socket_child_frame=L3_offset
      Coordinate L2L3_coord_0
      Coordinate L2L3_coord_1
      Coordinate L2L3_coord_2
      PhysicalOffsetFrame L2_offset: socket_parent=/bodyset/L2 translation=(0 0 0)
      PhysicalOffsetFrame L3_offset: socket_parent=/bodyset/L3 translation=(0 0 0)
    BallJoint L3L4: socket_parent_frame=L3_offset socket_child_frame=L4_offset
      Coordinate L3L4_coord_0
      Coordinate L3L4_coord_1
      Coordinate L3L4_coord_2
      PhysicalOffsetFrame L3_offset: socket_parent=/bodyset/L3 translation=(0 0 0)
      PhysicalOffsetFrame L4_offset: socket_parent=/bodyset/L4 translation=(0 0 0)
    BallJoint L4L5: socket_parent_frame=L4_offset socket_child_frame=L5_offset
      Coordinate L4L5_coord_0
      Coordinate L4L5_coord_1
      Coordinate L4L5_coord_2
      PhysicalOffsetFrame L4_offset: socket_parent=/bodyset/L4 translation=(0 0 0)
      PhysicalOffsetFrame L5_offset: socket_parent=/bodyset/L5 translation=(0 0 0)
    BallJoint L5S1: socket_parent_frame=L5_offset socket_child_frame=pelvis_offset
      Coordinate L5S1_coord_0
      Coordinate L5S1_coord_1
      Coordinate L5S1_coord_2
      PhysicalOffsetFrame L5_offset: socket_parent=/bodyset/L5 translation=(0 0 0)
      PhysicalOffsetFrame pelvis_offset: socket_parent=/bodyset/pelvis translation=(0 0 0)
    WeldJoint T1R1R: socket_parent_frame=T1_offset socket_child_frame=R1R_offset
      PhysicalOffsetFrame T1_offset: socket_parent=/bodyset/T1 translation=(0 0 0)
      PhysicalOffsetFrame R1R_offset: socket_parent=/bodyset/R1R translation=(0 0 0)
    WeldJoint T2R2R: socket_parent_frame=T2_offset socket_child_frame=R2R_offset
      PhysicalOffsetFrame T2_offset: socket_parent=/bodyset/T2 translation=(0 0 0)
      PhysicalOffsetFrame R2R_offset: socket_parent=/bodyset/R2R translation=(0 0 0)
    WeldJoint T3R3R: socket_parent_frame=T3_offset socket_child_frame=R3R_offset
      PhysicalOffsetFrame T3_offset: socket_parent=/bodyset/T3 translation=(0 0 0)
      PhysicalOffsetFrame R3R_offset: socket_parent=/bodyset/R3R translation=(0 0 0)
    WeldJoint T4R4R: socket_parent_frame=T4_offset socket_child_frame=R4R_offset
      PhysicalOffsetFrame T4_offset: socket_parent=/bodyset/T4 translation=(0 0 0)
      PhysicalOffsetFrame R4R_offset: socket_parent=/bodyset/R4R translation=(0 0 0)
    WeldJoint T5R5R: socket_parent_frame=T5_offset socket_child_frame=R5R_offset
      PhysicalOffsetFrame T5_offset: socket_parent=/bodyset/T5 translation=(0 0 0)
      PhysicalOffsetFrame R5R_offset: socket_parent=/bodyset/R5R translation=(0 0 0)
    WeldJoint T6R6R: socket_parent_frame=T6_offset socket_child_frame=R6R_offset
      PhysicalOffsetFrame T6_offset: socket_parent=/bodyset/T6 translation=(0 0 0)
      PhysicalOffsetFrame R6R_offset: socket_parent=/bodyset/R6R translation=(0 0 0)
    WeldJoint T7R7R: socket_parent_frame=T7_offset socket_child_frame=R7R_offset
      PhysicalOffsetFrame T7_offset: socket_parent=/bodyset/T7 translation=(0 0 0)
      PhysicalOffsetFrame R7R_offset: socket_parent=/bodyset/R7R translation=(0 0 0)
    WeldJoint T8R8R: socket_parent_frame=T8_offset socket_child_frame=R8R_offset
      PhysicalOffsetFrame T8_offset: socket_parent=/bodyset/T8 translation=(0 0 0)
      PhysicalOffsetFrame R8R_offset: socket_parent=/bodyset/R8R translation=(0 0 0)
    WeldJoint T9R9R: socket_parent_frame=T9_offset socket_child_frame=R9R_offset
      PhysicalOffsetFrame T9_offset: socket_parent=/bodyset/T9 translation=(0 0 0)
      PhysicalOffsetFrame R9R_offset: socket_parent=/bodyset/R9R translation=(0 0 0)
    WeldJoint T10R10R: socket_parent_frame=T10_offset socket_child_frame=R10R_offset
      PhysicalOffsetFrame T10_offset: socket_parent=/bodyset/T10 translation=(0 0 0)
      PhysicalOffsetFrame R10R_offset: socket_parent=/bodyset/R10R translation=(0 0 0)
    WeldJoint T11R11R: socket_parent_frame=T11_offset socket_child_frame=R11R_offset
      PhysicalOffsetFrame T11_offset: socket_parent=/bodyset/T11 translation=(0 0 0)
      PhysicalOffsetFrame R11R_offset: socket_parent=/bodyset/R11R translation=(0 0 0)
    WeldJoint T12R12R: socket_parent_frame=T12_offset socket_child_frame=R12R_offset
      PhysicalOffsetFrame T12_offset: socket_parent=/bodyset/T12 translation=(0 0 0)
      PhysicalOffsetFrame R12R_offset: socket_parent=/bodyset/R12R translation=(0 0 0)
    WeldJoint T1R1L: socket_parent_frame=T1_offset socket_child_frame=R1L_offset
      PhysicalOffsetFrame T1_offset: socket_parent=/bodyset/T1 translation=(0 0 0)
      PhysicalOffsetFrame R1L_offset: socket_parent=/bodyset/R1L translation=(0 0 0)
    WeldJoint T2R2L: socket_parent_frame=T2_offset socket_child_frame=R2L_offset
      PhysicalOffsetFrame T2_offset: socket_parent=/bodyset/T2 translation=(0 0 0)
      PhysicalOffsetFrame R2L_offset: socket_parent=/bodyset/R2L translation=(0 0 0)
    WeldJoint T3R3L: socket_parent_frame=T3_offset socket_child_frame=R3L_offset
      PhysicalOffsetFrame T3_offset: socket_parent=/bodyset/T3 translation=(0 0 0)
      PhysicalOffsetFrame R3L_offset: socket_parent=/bodyset/R3L translation=(0 0 0)
    WeldJoint T4R4L: socket_parent_frame=T4_offset socket_child_frame=R4L_offset
      PhysicalOffsetFrame T4_offset: socket_parent=/bodyset/T4 translation=(0 0 0)
      PhysicalOffsetFrame R4L_offset: socket_parent=/bodyset/R4L translation=(0 0 0)
    WeldJoint T5R5L: socket_parent_frame=T5_offset socket_child_frame=R5L_offset
      PhysicalOffsetFrame T5_offset: socket_parent=/bodyset/T5 translation=(0 0 0)
      PhysicalOffsetFrame R5L_offset: socket_parent=/bodyset/R5L translation=(0 0 0)
    WeldJoint T6R6L: socket_parent_frame=T6_offset socket_child_frame=R6L_offset
      PhysicalOffsetFrame T6_offset: socket_parent=/bodyset/T6 translation=(0 0 0)
      PhysicalOffsetFrame R6L_offset: socket_parent=/bodyset/R6L translation=(0 0 0)
    WeldJoint T7R7L: socket_parent_frame=T7_offset socket_child_frame=R7L_offset
      PhysicalOffsetFrame T7_offset: socket_parent=/bodyset/T7 translation=(0 0 0)
      PhysicalOffsetFrame R7L_offset: socket_parent=/bodyset/R7L translation=(0 0 0)
    WeldJoint T8R8L: socket_parent_frame=T8_offset socket_child_frame=R8L_offset
      PhysicalOffsetFrame T8_offset: socket_parent=/bodyset/T8 translation=(0 0 0)
      PhysicalOffsetFrame R8L_offset: socket_parent=/bodyset/R8L translation=(0 0 0)
    WeldJoint T9R9L: socket_parent_frame=T9_offset socket_child_frame=R9L_offset
      PhysicalOffsetFrame T9_offset: socket_parent=/bodyset/T9 translation=(0 0 0)
      PhysicalOffsetFrame R9L_offset: socket_parent=/bodyset/R9L translation=(0 0 0)
    WeldJoint T10R10L: socket_parent_frame=T10_offset socket_child_frame=R10L_offset
      PhysicalOffsetFrame T10_offset: socket_parent=/bodyset/T10 translation=(0 0 0)
      PhysicalOffsetFrame R10L_offset: socket_parent=/bodyset/R10L translation=(0 0 0)
    WeldJoint T11R11L: socket_parent_frame=T11_offset socket_child_frame=R11L_offset
      PhysicalOffsetFrame T11_offset: socket_parent=/bodyset/T11 translation=(0 0 0)
      PhysicalOffsetFrame R11L_offset: socket_parent=/bodyset/R11L translation=(0 0 0)
    WeldJoint T12R12L: socket_parent_frame=T12_offset socket_child_frame=R12L_offset
      PhysicalOffsetFrame T12_offset: socket_parent=/bodyset/T12 translation=(0 0 0)
      PhysicalOffsetFrame R12L_offset: socket_parent=/bodyset/R12L translation=(0 0 0)
    BallJoint AbdomenToSacrum: socket_parent_frame=pelvis_offset socket_child_frame=abdomen_offset
      Coordinate AbdomenToSacrum_coord_0
      Coordinate AbdomenToSacrum_coord_1
      Coordinate AbdomenToSacrum_coord_2
      PhysicalOffsetFrame pelvis_offset: socket_parent=/bodyset/pelvis translation=(0 0 0)
      PhysicalOffsetFrame abdomen_offset: socket_parent=/bodyset/abdomen translation=(0 0 0)
    WeldJoint SternumToR1R: socket_parent_frame=R1R_offset socket_child_frame=sternum_offset
      PhysicalOffsetFrame R1R_offset: socket_parent=/bodyset/R1R translation=(0 0 0)
      PhysicalOffsetFrame sternum_offset: socket_parent=/bodyset/sternum translation=(0 0 0)
    WeldJoint sternoclavicularRight: socket_parent_frame=sternum_offset socket_child_frame=clavicleRight_offset
      PhysicalOffsetFrame sternum_offset: socket_parent=/bodyset/sternum translation=(0 0 0)
      PhysicalOffsetFrame clavicleRight_offset: socket_parent=/bodyset/clavicleRight translation=(0 0 0)
    WeldJoint acromioclavicularRight: socket_parent_frame=clavicleRight_offset socket_child_frame=scapulaRight_offset
      PhysicalOffsetFrame clavicleRight_offset: socket_parent=/bodyset/clavicleRight translation=(0 0 0)
      PhysicalOffsetFrame scapulaRight_offset: socket_parent=/bodyset/scapulaRight translation=(0 0 0)
    BallJoint shoulderRight: socket_parent_frame=scapulaRight_offset socket_child_frame=upperArmRight_offset
      Coordinate shoulderRight_coord_0
      Coordinate shoulderRight_coord_1
      Coordinate shoulderRight_coord_2
      PhysicalOffsetFrame scapulaRight_offset: socket_parent=/bodyset/scapulaRight translation=(0 0 0)
      PhysicalOffsetFrame upperArmRight_offset: socket_parent=/bodyset/upperArmRight translation=(0 0 0)
    PinJoint elbowRight: socket_parent_frame=upperArmRight_offset socket_child_frame=forearmRight_offset
      Coordinate elbowRight_coord_0
      PhysicalOffsetFrame upperArmRight_offset: socket_parent=/bodyset/upperArmRight translation=(0 0 0)
      PhysicalOffsetFrame forearmRight_offset: socket_parent=/bodyset/forearmRight translation=(0 0 0)
    PinJoint wristRight: socket_parent_frame=forearmRight_offset socket_child_frame=handRight_offset
      Coordinate wristRight_coord_0
      PhysicalOffsetFrame forearmRight_offset: socket_parent=/bodyset/forearmRight translation=(0 0 0)
      PhysicalOffsetFrame handRight_offset: socket_parent=/bodyset/handRight translation=(0 0 0)
    WeldJoint sternoclavicularLeft: socket_parent_frame=sternum_offset socket_child_frame=clavicleLeft_offset
      PhysicalOffsetFrame sternum_offset: socket_parent=/bodyset/sternum translation=(0 0 0)
      PhysicalOffsetFrame clavicleLeft_offset: socket_parent=/bodyset/clavicleLeft translation=(0 0 0)
    WeldJoint acromioclavicularLeft: socket_parent_frame=clavicleLeft_offset socket_child_frame=scapulaLeft_offset
      PhysicalOffsetFrame clavicleLeft_offset: socket_parent=/bodyset/clavicleLeft translation=(0 0 0)
      PhysicalOffsetFrame scapulaLeft_offset: socket_parent=/bodyset/scapulaLeft translation=(0 0 0)
    BallJoint shoulderLeft: socket_parent_frame=scapulaLeft_offset socket_child_frame=upperArmLeft_offset
      Coordinate shoulderLeft_coord_0
      Coordinate shoulderLeft_coord_1
      Coordinate shoulderLeft_coord_2
      PhysicalOffsetFrame scapulaLeft_offset: socket_parent=/bodyset/scapulaLeft translation=(0 0 0)
      PhysicalOffsetFrame upperArmLeft_offset: socket_parent=/bodyset/upperArmLeft translation=(0 0 0)
    PinJoint elbowLeft: socket_parent_frame=upperArmLeft_offset socket_child_frame=forearmLeft_offset
      Coordinate elbowLeft_coord_0
      PhysicalOffsetFrame upperArmLeft_offset: socket_parent=/bodyset/upperArmLeft translation=(0 0 0)
      PhysicalOffsetFrame forearmLeft_offset: socket_parent=/bodyset/forearmLeft translation=(0 0 0)
    PinJoint wristLeft: socket_parent_frame=forearmLeft_offset socket_child_frame=handLeft_offset
      Coordinate wristLeft_coord_0
      PhysicalOffsetFrame forearmLeft_offset: socket_parent=/bodyset/forearmLeft translation=(0 0 0)
      PhysicalOffsetFrame handLeft_offset: socket_parent=/bodyset/handLeft translation=(0 0 0)
    BallJoint hipRight: socket_parent_frame=pelvis_offset socket_child_frame=thighRight_offset
      Coordinate hipRight_coord_0
      Coordinate hipRight_coord_1
      Coordinate hipRight_coord_2
      PhysicalOffsetFrame pelvis_offset: socket_parent=/bodyset/pelvis translation=(0 0 0)
      PhysicalOffsetFrame thighRight_offset: socket_parent=/bodyset/thighRight translation=(0 0 0)
    BallJoint kneeRight: socket_parent_frame=thighRight_offset socket_child_frame=shankRight_offset
      Coordinate kneeRight_coord_0
      Coordinate kneeRight_coord_1
      Coordinate kneeRight_coord_2
      PhysicalOffsetFrame thighRight_offset: socket_parent=/bodyset/thighRight translation=(0 0 0)
      PhysicalOffsetFrame shankRight_offset: socket_parent=/bodyset/shankRight translation=(0 0 0)
    WeldJoint patellofemoralRight: socket_parent_frame=thighRight_offset socket_child_frame=patellaRight_offset
      PhysicalOffsetFrame thighRight_offset: socket_parent=/bodyset/thighRight translation=(0 0 0)
      PhysicalOffsetFrame patellaRight_offset: socket_parent=/bodyset/patellaRight translation=(0 0 0)
    PinJoint ankleRight: socket_parent_frame=shankRight_offset socket_child_frame=talusRight_offset
      Coordinate ankleRight_coord_0
      PhysicalOffsetFrame shankRight_offset: socket_parent=/bodyset/shankRight translation=(0 0 0)
      PhysicalOffsetFrame talusRight_offset: socket_parent=/bodyset/talusRight translation=(0 0 0)
    PinJoint subtalarRight: socket_parent_frame=talusRight_offset socket_child_frame=calcaneusRight_offset
      Coordinate subtalarRight_coord_0
      PhysicalOffsetFrame talusRight_offset: socket_parent=/bodyset/talusRight translation=(0 0 0)
      PhysicalOffsetFrame calcaneusRight_offset: socket_parent=/bodyset/calcaneusRight translation=(0 0 0)
    PinJoint mtpRight: socket_parent_frame=calcaneusRight_offset socket_child_frame=toesRight_offset
      Coordinate mtpRight_coord_0
      PhysicalOffsetFrame calcaneusRight_offset: socket_parent=/bodyset/calcaneusRight translation=(0 0 0)
      PhysicalOffsetFrame toesRight_offset: socket_parent=/bodyset/toesRight translation=(0 0 0)
    BallJoint hipLeft: socket_parent_frame=pelvis_offset socket_child_frame=thighLeft_offset
      Coordinate hipLeft_coord_0
      Coordinate hipLeft_coord_1
      Coordinate hipLeft_coord_2
      PhysicalOffsetFrame pelvis_offset: socket_parent=/bodyset/pelvis translation=(0 0 0)
      PhysicalOffsetFrame thighLeft_offset: socket_parent=/bodyset/thighLeft translation=(0 0 0)
    BallJoint kneeLeft: socket_parent_frame=thighLeft_offset socket_child_frame=shankLeft_offset
      Coordinate kneeLeft_coord_0
      Coordinate kneeLeft_coord_1
      Coordinate kneeLeft_coord_2
      PhysicalOffsetFrame thighLeft_offset: socket_parent=/bodyset/thighLeft translation=(0 0 0)
      PhysicalOffsetFrame shankLeft_offset: socket_parent=/bodyset/shankLeft translation=(0 0 0)
    WeldJoint patellofemoralLeft: socket_parent_frame=thighLeft_offset socket_child_frame=patellaLeft_offset
      PhysicalOffsetFrame thighLeft_offset: socket_parent=/bodyset/thighLeft translation=(0 0 0)
      PhysicalOffsetFrame patellaLeft_offset: socket_parent=/bodyset/patellaLeft translation=(0 0 0)
    PinJoint ankleLeft: socket_parent_frame=shankLeft_offset socket_child_frame=talusLeft_offset
      Coordinate ankleLeft_coord_0
      PhysicalOffsetFrame shankLeft_offset: socket_parent=/bodyset/shankLeft translation=(0 0 0)
      PhysicalOffsetFrame talusLeft_offset: socket_parent=/bodyset/talusLeft translation=(0 0 0)
    PinJoint subtalarLeft: socket_parent_frame=talusLeft_offset socket_child_frame=calcaneusLeft_offset
      Coordinate subtalarLeft_coord_0
      PhysicalOffsetFrame talusLeft_offset: socket_parent=/bodyset/talusLeft translation=(0 0 0)
      PhysicalOffsetFrame calcaneusLeft_offset: socket_parent=/bodyset/calcaneusLeft translation=(0 0 0)
    PinJoint mtpLeft: socket_parent_frame=calcaneusLeft_offset socket_child_frame=toesLeft_offset
      Coordinate mtpLeft_coord_0
      PhysicalOffsetFrame calcaneusLeft_offset: socket_parent=/bodyset/calcaneusLeft translation=(0 0 0)
      PhysicalOffsetFrame toesLeft_offset: socket_parent=/bodyset/toesLeft translation=(0 0 0)
