# OpenSim document version 40000
Model cyclist_fullBodyMuscleActuated:
  gravity: [0 -9.80665 0]
  length_units: meters
  force_units: N
  Ground
  BodySet:
    Body thigh: mass=0.5 mass_center=([0 0 0]) inertia=([1 1 1 0 0 0]) meshes=femur_r.vtp
    Body shank: mass=0.5 mass_center=([0 0 0]) inertia=([1 1 1 0 0 0]) meshes=tibia_r.vtp
