# OpenSim document version 40000
MarkerSet:
  Marker racr: scapula_R (-0.003314348 0.03249752 0.01340522)
  Marker lacr: scapula_L (-0.004629908 0.03079289 -0.01395711)
  Marker c7: thoracic1 (-0.06394691 -0.02949534 -0.0003217909)
  Marker jug: sternum (0.03825817 -0.01014938 -0.03625197)
  Marker rua: humerus_r (0.007760622 -0.1553493 0.04749977)
  Marker rlel: humerus_r (-0.006350178 -0.285281 0.01832063)
  Marker rfa: radius_r (-0.002742235 -0.116422 0.05029618)
  Marker rdr: radius_r (-0.01629038 -0.2371401 0.05294792)
  Marker lua: humerus_l (0.01974924 -0.1382571 -0.04338432)
  Marker llel: humerus_l (-0.005481908 -0.2777839 -0.02036995)
  Marker lfa: radius_l (0.0144711 -0.1083545 -0.04707736)
  Marker ldr: radius_l (-0.01519612 -0.2347127 -0.05089283)
  Marker s2: pelvis (-0.1788576 0.01486563 0.002209909)
  Marker ric: pelvis (-0.07428474 0.05748869 0.1582353)
  Marker lic: pelvis (-0.06790261 0.07971094 -0.1469443)
  Marker rasi: pelvis (0.01415641 -0.01280728 0.1117803)
  Marker lasi: pelvis (0.01743346 0.003826848 -0.1103151)
  Marker rpsi: pelvis (-0.1712804 0.03115054 0.04892593)
  Marker lpsi: pelvis (-0.1713809 0.03645239 -0.04833525)
  Marker rgt: femur_r (-0.003366164 -0.02254925 0.09864319)
  Marker rth1: femur_r (0.01601942 -0.188994 0.1039161)
  Marker rth2: femur_r (0.03504406 -0.2762425 0.09135815)
  Marker rth3: femur_r (0.01146596 -0.3589348 0.07858965)
  Marker rth4: femur_r (0.07035533 -0.2750954 0.07621553)
  Marker rlfc: femur_r (0.001775861 -0.4364748 0.07116239)
  Marker rmfc: femur_r (-0.01209068 -0.4434265 -0.05247901)
  Marker rsh1: tibia_r (-0.02430126 -0.08818523 0.08663429)
  Marker rsh2: tibia_r (-0.003100994 -0.1774173 0.07961999)
  Marker rsh3: tibia_r (-0.02846395 -0.2603427 0.0716526)
  Marker rsh4: tibia_r (0.02741917 -0.1746549 0.05641504)
  Marker rlmal: tibia_r (-0.02013627 -0.4170857 0.04201207)
  Marker rmmal: tibia_r (0.00531456 -0.3829604 -0.04198921)
  Marker rcal: calcn_r (-0.01458039 -0.008374531 -0.02061246)
  Marker rtoe: calcn_r (0.2706562 0.04217206 0.006385394)
  Marker rmt5: calcn_r (0.1713306 -0.008064857 0.06535094)
  Marker rmt1: calcn_r (0.1883594 -0.001800883 -0.05399704)
  Marker lgt: femur_l (-0.001264701 -0.01069221 -0.1077753)
  Marker lth1: femur_l (0.003037256 -0.1554096 -0.1109223)
  Marker lth2: femur_l (0.0245716 -0.2397556 -0.09498574)
  Marker lth3: femur_l (0.002582907 -0.3255109 -0.07972499)
  Marker lth4: femur_l (0.06033508 -0.2374057 -0.08388927)
  Marker llfc: femur_l (-0.002094714 -0.434966 -0.06322264)
  Marker lmfc: femur_l (-0.02073921 -0.4412419 0.05722135)
  Marker lsh1: tibia_l (-0.01732815 -0.1106833 -0.08066314)
  Marker lsh2: tibia_l (0.003184629 -0.1956046 -0.07167862)
  Marker lsh3: tibia_l (-0.02351071 -0.2840322 -0.06929368)
  Marker lsh4: tibia_l (0.03129475 -0.1943364 -0.04521983)
  Marker llmal: tibia_l (-0.02148183 -0.4282166 -0.04912696)
  Marker lmmal: tibia_l (-0.006427647 -0.4074253 0.041784)
  Marker lcal: calcn_l (-0.01270533 -0.03649784 0.01285049)
  Marker ltoe: calcn_l (0.2647878 0.05347633 -0.003148464)
  Marker lmt5: calcn_l (0.1791408 -0.01049546 -0.06589801)
  Marker lmt1: calcn_l (0.1834454 -0.006367775 0.05163477)
