# OpenSim document version 40000
ExternalLoads BLR_s01c0101:
  datafile: /Users/rosswilkinson/Google Drive/projects/moco-cycling-standing/setup/BLR_s01c0101externalLoads.mot
  external_loads_model_kinematics_file: /Users/rosswilkinson/Google Drive/projects/moco-cycling-standing/results/BLR_s01c0101inverseKinematics.mot
  lowpass_cutoff_frequency_for_load_kinematics: 12
  ExternalForce forceCrankRight: applied_to_body=toes_r force_expressed_in_body=ground point_expressed_in_body=ground
      force_identifier=forceCrankRight point_identifier=pointCrankRight
  ExternalForce forceCrankLeft: applied_to_body=toes_l force_expressed_in_body=ground point_expressed_in_body=ground
      force_identifier=forceCrankLeft point_identifier=pointCrankLeft
  ExternalForce forceHandlebarRight: applied_to_body=hand_r force_expressed_in_body=ground
      point_expressed_in_body=ground force_identifier=forceHandlebarRight point_identifier=pointHandlebarRight
  ExternalForce forceHandlebarLeft: applied_to_body=hand_l force_expressed_in_body=ground
      point_expressed_in_body=ground force_identifier=forceHandlebarLeft point_identifier=pointHandlebarLeft
