# OpenSim document version 30000
AnalyzeTool subject01_standing_10_70:
  model_file: C:\Users\uqrwilk5\OneDrive - The University of Queensland\exp01\subject01\results\subject01_scale_model.osim
  replace_force_set: false
  results_directory: F:\exp01_EMA
  output_precision: 8
  initial_time: 0.01
  final_time: 10
  solve_for_equilibrium_for_auxiliary_states: false
  maximum_number_of_integrator_steps: 20000
  maximum_integrator_step_size: 1
  minimum_integrator_step_size: 1e-8
  integrator_error_tolerance: 1e-5
  external_loads_file: C:\Users\uqrwilk5\OneDrive - The University of Queensland\exp01\subject01\setup\subject01_standing_10_70_ext_loads_file.xml
  coordinates_file: C:\Users\uqrwilk5\OneDrive - The University of Queensland\exp01\subject01\results\subject01_standing_10_70_ik.mot
  lowpass_cutoff_frequency_for_coodinates: 12
  AnalysisSet Analyses:
    MuscleAnalysis: start_time=0.01 end_time=10 step_interval=1 in_degrees=true muscle_list=all
        moment_arm_coordinate_list=all compute_moments=true
    BodyKinematics: start_time=0.01 end_time=10 step_interval=1 in_degrees=true bodies=all
        express_results_in_body_local_frame=false
