# OpenSim document version 30000
AnalyzeTool subject01_standing_10_70:
  model_file: D:\exp01\subject01\results\subject01modelScaled.osim
  replace_force_set: false
  results_directory: D:\exp01\subject01\results
  output_precision: 8
  initial_time: 0.01
  final_time: 10
  solve_for_equilibrium_for_auxiliary_states: false
  maximum_number_of_integrator_steps: 20000
  maximum_integrator_step_size: 1
  minimum_integrator_step_size: 1e-8
  integrator_error_tolerance: 1e-5
  coordinates_file: D:\exp01\subject01\results\subject01_standing_10_70inverseKinematics.mot
  lowpass_cutoff_frequency_for_coodinates: 12
  lowpass_cutoff_frequency_for_coordinates: -1
  AnalysisSet Analyses:
    PointKinematics: on=false start_time=0.005 end_time=9.995 step_interval=1 in_degrees=true
        relative_to_body_name=ground point=([0 0 0])
    MuscleAnalysis: start_time=0.01 end_time=10 step_interval=1 in_degrees=true muscle_list=all
        moment_arm_coordinate_list=(hip_flexion_r knee_angle_r ankle_angle_r) compute_moments=true
    BodyKinematics: on=false start_time=0.005 end_time=9.995 step_interval=1 in_degrees=true bodies=all
        express_results_in_body_local_frame=false
